<!--
Generated by vsp2jsbsim.py
Author: Jüttner Domokos
-->
<aerodynamics>

  <function name="aero/beta-deg-abs">
    <description>Beta absolute value</description>
    <abs>
      <property>aero/beta-deg</property>
    </abs>
  </function>

  <function name="aero/pb">
    <description>PB Denormalization</description>
    <product>
      <property>aero/bi2vel</property>
      <property>velocities/p-aero-rad_sec</property>
    </product>
  </function>

  <function name="aero/qb">
    <description>For denormalization</description>
    <product>
      <property>aero/ci2vel</property>
      <property>velocities/q-aero-rad_sec</property>
    </product>
  </function>

  <function name="aero/rb">
    <description>For denormalization</description>
    <product>
      <property>aero/bi2vel</property>
      <property>velocities/r-aero-rad_sec</property>
    </product>

  </function>
  <!-- CL -->
  <!-- base -->
  <function name="aero/CL_base">
    <table>
      <independentVar lookup="row">velocities/mach</independentVar>
      <independentVar lookup="column">aero/alpha-deg</independentVar>
      <independentVar lookup="table">aero/beta-deg</independentVar>
      <tableData breakPoint="-10.00000">
                -10.00      0.00     10.00     20.00     30.00     40.00     50.00
        0.20000  -0.71831   0.00772   0.74315   0.96100   0.96950   0.98350   0.97816
        0.60000  -0.77603   0.00797   0.80214   0.96722   0.97692   0.98490   0.97688
        0.88000  -0.85538   0.00877   0.88274   0.98124   0.99359   0.99955   0.97879
        0.92000  -0.86617   0.00931   0.89284   0.98852   1.00427   1.01645   0.99577
        0.96000  -0.87398   0.00999   0.89917   0.99374   1.03700   1.04673   1.02186
        0.98000  -0.87836   0.01046   0.90777   1.01303   1.07883   1.08781   1.06570
        1.01000  -0.88465  -0.00328   0.85521   0.93006   0.97358   0.96803   0.95789
      </tableData>

      <tableData breakPoint="0.00000">
                -10.00      0.00     10.00     20.00     30.00     40.00     50.00
        0.20000  -0.75395   0.00596   0.76767   0.97546   0.98821   0.99119   0.99248
        0.60000  -0.81004   0.00620   0.82110   0.98268   0.99060   0.99308   0.99242
        0.88000  -0.87218   0.00697   0.89036   0.99353   1.00455   1.00715   1.00072
        0.92000  -0.88159   0.00723   0.90046   1.00001   1.01480   1.02111   1.01357
        0.96000  -0.89018   0.00754   0.90966   1.01508   1.04323   1.05592   1.03630
        0.98000  -0.89608   0.00776   0.91846   1.03521   1.08356   1.10472   1.09509
        1.01000  -0.87827  -0.00625   0.86329   0.94229   0.97832   0.97825   0.97818
      </tableData>

      <tableData breakPoint="10.00000">
                -10.00      0.00     10.00     20.00     30.00     40.00     50.00
        0.20000  -0.71760   0.00738   0.74316   0.96083   0.96975   0.98363   0.97786
        0.60000  -0.77521   0.00771   0.80208   0.96822   0.97751   0.98531   0.97797
        0.88000  -0.85460   0.00868   0.88153   0.98261   0.99479   0.99989   0.97864
        0.92000  -0.86499   0.00923   0.89167   0.98975   1.00500   1.01629   0.99595
        0.96000  -0.87263   0.00994   0.89776   0.99378   1.03822   1.04739   1.02205
        0.98000  -0.87662   0.01046   0.90580   1.01416   1.08098   1.08832   1.06628
        1.01000  -0.88427  -0.00325   0.85510   0.93058   0.97342   0.96798   0.95790
      </tableData>

    </table>
  </function>

  <!-- elevator -->
  <function name="aero/CL_elevator_-24">
    <table>
      <independentVar lookup="row">velocities/mach</independentVar>
      <independentVar lookup="column">aero/alpha-deg</independentVar>
      <independentVar lookup="table">aero/beta-deg</independentVar>
      <tableData breakPoint="0.00000">
                -10.00      0.00     10.00     20.00     30.00     40.00     50.00
        0.20000  -0.09800  -0.19864  -0.28962  -0.32392  -0.23309  -0.12387  -0.01896
        0.60000  -0.07964  -0.19410  -0.27679  -0.33946  -0.25170  -0.13939  -0.02007
        0.88000  -0.06272  -0.18294  -0.27481  -0.34938  -0.31464  -0.19070  -0.03768
        0.92000  -0.06001  -0.17959  -0.27435  -0.34887  -0.33441  -0.21238  -0.04814
        0.96000  -0.05979  -0.17505  -0.27442  -0.34733  -0.34456  -0.25928  -0.06001
        0.98000  -0.06109  -0.17213  -0.27306  -0.34531  -0.34499  -0.29778  -0.08410
        1.01000  -0.10008  -0.17452  -0.24016  -0.31920  -0.35525  -0.35808  -0.22446
      </tableData>

    </table>
  </function>

  <function name="aero/CL_elevator_-9.5">
    <table>
      <independentVar lookup="row">velocities/mach</independentVar>
      <independentVar lookup="column">aero/alpha-deg</independentVar>
      <independentVar lookup="table">aero/beta-deg</independentVar>
      <tableData breakPoint="0.00000">
                -10.00      0.00     10.00     20.00     30.00     40.00     50.00
        0.20000  -0.10020  -0.14100  -0.14306  -0.12656  -0.04359   0.00795   0.01032
        0.60000  -0.08983  -0.15132  -0.15192  -0.13809  -0.04281   0.01096   0.01422
        0.88000  -0.07905  -0.17061  -0.18397  -0.16521  -0.05506   0.01779   0.02608
        0.92000  -0.07753  -0.17292  -0.19386  -0.17699  -0.06504   0.01952   0.03074
        0.96000  -0.07769  -0.17439  -0.21000  -0.19776  -0.08380   0.02247   0.04632
        0.98000  -0.07923  -0.17435  -0.22166  -0.21813  -0.10759   0.02102   0.03884
        1.01000  -0.10008  -0.17452  -0.23089  -0.26614  -0.19217  -0.03197  -0.00323
      </tableData>

    </table>
  </function>

  <function name="aero/CL_elevator_-3">
    <table>
      <independentVar lookup="row">velocities/mach</independentVar>
      <independentVar lookup="column">aero/alpha-deg</independentVar>
      <independentVar lookup="table">aero/beta-deg</independentVar>
      <tableData breakPoint="0.00000">
                -10.00      0.00     10.00     20.00     30.00     40.00     50.00
        0.20000  -0.04135  -0.04547  -0.04567  -0.03982   0.00187   0.00346   0.00534
        0.60000  -0.04004  -0.04941  -0.04902  -0.04256   0.00290   0.00485   0.00638
        0.88000  -0.04747  -0.05824  -0.06154  -0.04663   0.00462   0.00796   0.01264
        0.92000  -0.04892  -0.06093  -0.06587  -0.04958   0.00505   0.00935   0.01526
        0.96000  -0.05360  -0.06488  -0.07193  -0.05835   0.00583   0.01226   0.02865
        0.98000  -0.05656  -0.06795  -0.07817  -0.06787   0.00589   0.01215   0.02004
        1.01000  -0.07016  -0.07864  -0.08820  -0.09101  -0.01502  -0.00013   0.00000
      </tableData>

    </table>
  </function>

  <function name="aero/CL_elevator_1.5">
    <table>
      <independentVar lookup="row">velocities/mach</independentVar>
      <independentVar lookup="column">aero/alpha-deg</independentVar>
      <independentVar lookup="table">aero/beta-deg</independentVar>
      <tableData breakPoint="0.00000">
                -10.00      0.00     10.00     20.00     30.00     40.00     50.00
        0.20000   0.01817   0.02371   0.02418   0.00664  -0.00494  -0.00843  -0.01155
        0.60000   0.01984   0.02611   0.03495   0.00000  -0.00643  -0.01062  -0.01542
        0.88000   0.02444   0.03183   0.03524  -0.00358  -0.00952  -0.01720  -0.02615
        0.92000   0.02610   0.03366  -0.01153  -0.00365  -0.01046  -0.01875  -0.02741
        0.96000   0.02881   0.03645   0.04029  -0.00276  -0.01112  -0.01908  -0.02122
        0.98000   0.03077   0.03857   0.04042  -0.00019  -0.01040  -0.01967  -0.03376
        1.01000   0.03984   0.04449   0.04981   0.03374   0.00000   0.00000   0.00000
      </tableData>

    </table>
  </function>

  <function name="aero/CL_elevator">
    <interpolate1d>
      <property>fcs/surfaces/elevator-pos-deg</property>
      <value>-24</value> <property>aero/CL_elevator_-24</property>
      <value>-9.5</value> <property>aero/CL_elevator_-9.5</property>
      <value>-3</value> <property>aero/CL_elevator_-3</property>
      <value>0</value> <value>0</value>
      <value>1.5</value> <property>aero/CL_elevator_1.5</property>
    </interpolate1d>
  </function>

  <!-- flaps -->
  <function name="aero/CL_flaps_20">
    <table>
      <independentVar lookup="row">velocities/mach</independentVar>
      <independentVar lookup="column">aero/alpha-deg</independentVar>
      <independentVar lookup="table">aero/beta-deg</independentVar>
      <tableData breakPoint="0.00000">
                -10.00      0.00     10.00     20.00     30.00     40.00     50.00
        0.20000   0.42152   0.43206   0.38429   0.50650   0.61127   0.65908   0.62066
        0.60000   0.44887   0.49204   0.44172   0.53975   0.64156   0.69684   0.67699
        0.88000   0.46433   0.65866   0.48244   0.58896   0.67931   0.74422   0.73907
        0.92000   0.46748   0.72268   0.48721   0.59678   0.68354   0.74954   0.74733
        0.96000   0.47798   0.82970   0.59191   0.60501   0.69118   0.76643   0.76925
        0.98000   0.49619   0.93012   0.61135   0.60913   0.70028   0.78211   0.76951
        1.01000   0.21656   0.98464   0.66067   0.58368   0.63936   0.73389   0.73389
      </tableData>

    </table>
  </function>

  <function name="aero/CL_flaps_30">
    <table>
      <independentVar lookup="row">velocities/mach</independentVar>
      <independentVar lookup="column">aero/alpha-deg</independentVar>
      <independentVar lookup="table">aero/beta-deg</independentVar>
      <tableData breakPoint="0.00000">
                -10.00      0.00     10.00     20.00     30.00     40.00     50.00
        0.20000   0.58201   0.58553   0.48194   0.51448   0.61128   0.66030   0.62262
        0.60000   0.63148   0.66565   0.50045   0.55034   0.63903   0.69697   0.67954
        0.88000   0.70908   0.88930   0.51186   0.58600   0.67333   0.73941   0.74265
        0.92000   0.73615   0.97449   0.50109   0.58994   0.67914   0.75378   0.75008
        0.96000   0.78732   1.05748   0.59336   0.60319   0.68816   0.77458   0.77477
        0.98000   0.84414   1.11040   0.65236   0.61129   0.70118   0.79467   0.77826
        1.01000   0.60453   1.14822   0.68735   0.57859   0.62824   0.73318   0.73391
      </tableData>

    </table>
  </function>

  <function name="aero/CL_flaps">
    <interpolate1d>
      <property>fcs/surfaces/flaps-pos-deg</property>
      <value>0</value> <value>0</value>
      <value>20</value> <property>aero/CL_flaps_20</property>
      <value>30</value> <property>aero/CL_flaps_30</property>
    </interpolate1d>
  </function>

  <!-- left-flaperon -->
  <function name="aero/CL_left-flaperon_-51">
    <table>
      <independentVar lookup="row">velocities/mach</independentVar>
      <independentVar lookup="column">aero/alpha-deg</independentVar>
      <independentVar lookup="table">aero/beta-deg</independentVar>
      <tableData breakPoint="0.00000">
                -10.00      0.00     10.00     20.00     30.00     40.00     50.00
        0.20000  -0.04548  -0.16831  -0.17064  -0.00045  -0.00197  -0.00214  -0.00160
        0.60000  -0.02732  -0.19397  -0.17389  -0.00238  -0.00292  -0.00451  -0.00320
        0.88000  -0.01481  -0.27074  -0.15986  -0.00463  -0.00907  -0.00734  -0.00797
        0.92000  -0.01511  -0.29754  -0.15382  -0.00697  -0.00982  -0.01006  -0.00917
        0.96000  -0.02028  -0.33443  -0.14844  -0.01034  -0.01400  -0.01443  -0.00410
        0.98000  -0.02210  -0.36490  -0.15247  -0.01802  -0.02083  -0.02188  -0.02161
        1.01000  -0.03347  -0.32142  -0.11593  -0.02612   0.00013  -0.00084   0.00000
      </tableData>

    </table>
  </function>

  <function name="aero/CL_left-flaperon">
    <interpolate1d>
      <property>fcs/surfaces/left-flaperon-pos-deg</property>
      <value>-51</value> <property>aero/CL_left-flaperon_-51</property>
      <value>0</value> <value>0</value>
    </interpolate1d>
  </function>

  <!-- right-flaperon -->
  <function name="aero/CL_right-flaperon_-51">
    <table>
      <independentVar lookup="row">velocities/mach</independentVar>
      <independentVar lookup="column">aero/alpha-deg</independentVar>
      <independentVar lookup="table">aero/beta-deg</independentVar>
      <tableData breakPoint="0.00000">
                -10.00      0.00     10.00     20.00     30.00     40.00     50.00
        0.20000  -0.04532  -0.16833  -0.17105  -0.00043  -0.00191  -0.00225  -0.00160
        0.60000  -0.02730  -0.19428  -0.17263  -0.00235  -0.00294  -0.00439  -0.00294
        0.88000  -0.01477  -0.27038  -0.15958  -0.00468  -0.00925  -0.00762  -0.00706
        0.92000  -0.01447  -0.29744  -0.15311  -0.00692  -0.01001  -0.00977  -0.00836
        0.96000  -0.02059  -0.33627  -0.14780  -0.01055  -0.01457  -0.01412  -0.00321
        0.98000  -0.02209  -0.36473  -0.15212  -0.01797  -0.02124  -0.02202  -0.02193
        1.01000  -0.03263  -0.32141  -0.11591  -0.02617  -0.00013  -0.00081   0.00000
      </tableData>

    </table>
  </function>

  <function name="aero/CL_right-flaperon">
    <interpolate1d>
      <property>fcs/surfaces/right-flaperon-pos-deg</property>
      <value>-51</value> <property>aero/CL_right-flaperon_-51</property>
      <value>0</value> <value>0</value>
    </interpolate1d>
  </function>

  <!-- rudder -->
  <function name="aero/CL_rudder_-35">
    <table>
      <independentVar lookup="row">velocities/mach</independentVar>
      <independentVar lookup="column">aero/alpha-deg</independentVar>
      <independentVar lookup="table">aero/beta-deg</independentVar>
      <tableData breakPoint="-10.00000">
                -10.00      0.00     10.00     20.00     30.00     40.00     50.00
        0.20000   0.00294  -0.00155  -0.00313  -0.01256  -0.02670  -0.01170  -0.00149
        0.60000   0.00490  -0.00064   0.01161  -0.01316  -0.03072  -0.01310  -0.00218
        0.88000   0.00320   0.00122   0.00539  -0.00497  -0.00855  -0.00824  -0.00698
        0.92000   0.00566   0.00350   0.00348  -0.00354  -0.00971  -0.01031  -0.00890
        0.96000   0.12837   0.11487   0.02526  -0.00014  -0.01154  -0.01192  -0.00955
        0.98000   0.01113   0.01404   0.05023  -0.00402  -0.01292  -0.01315  -0.01087
        1.01000   0.02599   0.00309  -0.02017  -0.01784  -0.02430  -0.02541  -0.02425
      </tableData>

      <tableData breakPoint="0.00000">
                -10.00      0.00     10.00     20.00     30.00     40.00     50.00
        0.20000   0.00025   0.00061  -0.00575  -0.01145   0.01786  -0.00295  -0.00277
        0.60000   0.00233   0.00061  -0.00061  -0.01191   0.02649  -0.00392  -0.00389
        0.88000   0.00450   0.00228  -0.00378  -0.00514  -0.00698  -0.00768  -0.00662
        0.92000   0.02088   0.00186  -0.00520  -0.00577  -0.00874  -0.00811  -0.00646
        0.96000   0.00622   0.00196  -0.00355   0.00531  -0.00929  -0.00835   0.00249
        0.98000   0.00592   0.00178  -0.00399  -0.00780  -0.01017  -0.01075  -0.00996
        1.01000   0.01002   0.00330  -0.00386  -0.01059  -0.01489  -0.01705  -0.01756
      </tableData>

      <tableData breakPoint="10.00000">
                -10.00      0.00     10.00     20.00     30.00     40.00     50.00
        0.20000   0.00772   0.00868   0.01077  -0.00831  -0.00769   0.00108  -0.00323
        0.60000   0.02284   0.00848   0.01786  -0.00990  -0.00048   0.02209   0.00032
        0.88000   0.00869   0.01901   0.03273   0.00105  -0.00357  -0.00433  -0.00294
        0.92000   0.02288   0.08550   0.02642   0.00115  -0.00231  -0.00469  -0.00475
        0.96000   0.09479   0.04572  -0.04448   0.00499  -0.00535  -0.00657  -0.00571
        0.98000   0.01269   0.01114   0.01609   0.01054  -0.00268  -0.00810  -0.00635
        1.01000   0.02391   0.00506  -0.01788  -0.00207  -0.00870  -0.01129  -0.01133
      </tableData>

    </table>
  </function>

  <function name="aero/CL_rudder_35">
    <table>
      <independentVar lookup="row">velocities/mach</independentVar>
      <independentVar lookup="column">aero/alpha-deg</independentVar>
      <independentVar lookup="table">aero/beta-deg</independentVar>
      <tableData breakPoint="-10.00000">
                -10.00      0.00     10.00     20.00     30.00     40.00     50.00
        0.20000   0.00801   0.00823   0.00929  -0.00772  -0.02307  -0.01751  -0.00389
        0.60000   0.00899   0.00873   0.01787  -0.01177  -0.02268  -0.00594  -0.00318
        0.88000   0.00947   0.01838   0.04066   0.00081  -0.00235  -0.00426  -0.00477
        0.92000   0.01915   0.10606   0.02585   0.00187  -0.00125  -0.00535  -0.00570
        0.96000   0.09092   0.04907  -0.04421   0.00571  -0.00410  -0.00587  -0.00569
        0.98000   0.01447   0.01124   0.01470   0.01109   0.00000  -0.00679  -0.00567
        1.01000   0.02426   0.00508  -0.01609  -0.00170  -0.00901  -0.01138  -0.01135
      </tableData>

      <tableData breakPoint="0.00000">
                -10.00      0.00     10.00     20.00     30.00     40.00     50.00
        0.20000   0.00011   0.00091  -0.01735  -0.00551   0.01462  -0.00431  -0.00274
        0.60000   0.00246  -0.00071  -0.00235  -0.01038   0.01691  -0.00520  -0.00448
        0.88000   0.00375   0.00271  -0.00334  -0.00529  -0.00685  -0.00784  -0.00679
        0.92000   0.05322   0.00185  -0.00501  -0.00548  -0.00825  -0.00783  -0.00662
        0.96000   0.00598   0.00188  -0.00432  -0.00191  -0.00898  -0.00797   0.00278
        0.98000   0.00592   0.00184  -0.00468  -0.00788  -0.01015  -0.01053  -0.01001
        1.01000   0.01003   0.00329  -0.00389  -0.01058  -0.01489  -0.01751  -0.01759
      </tableData>

      <tableData breakPoint="10.00000">
                -10.00      0.00     10.00     20.00     30.00     40.00     50.00
        0.20000   0.00221  -0.00151   0.00164  -0.01083  -0.00762   0.00187  -0.00220
        0.60000   0.01350  -0.00037   0.01321  -0.01312   0.00118  -0.00271  -0.00414
        0.88000   0.00244   0.00126   0.00573  -0.00531  -0.00934  -0.00815  -0.00650
        0.92000   0.00426   0.00350   0.00184  -0.00333  -0.01039  -0.00969  -0.00871
        0.96000   0.11780   0.11885   0.02293  -0.00068  -0.01266  -0.01229  -0.00937
        0.98000   0.00952   0.01393   0.05284  -0.00590  -0.01659  -0.01441  -0.01141
        1.01000   0.02565   0.00308  -0.02188  -0.01828  -0.02406  -0.02537  -0.02433
      </tableData>

    </table>
  </function>

  <function name="aero/CL_rudder">
    <interpolate1d>
      <property>fcs/surfaces/rudder-pos-deg</property>
      <value>-35</value> <property>aero/CL_rudder_-35</property>
      <value>0</value> <value>0</value>
      <value>35</value> <property>aero/CL_rudder_35</property>
    </interpolate1d>
  </function>

  <!-- slats -->
  <function name="aero/CL_slats_27.5">
    <table>
      <independentVar lookup="row">velocities/mach</independentVar>
      <independentVar lookup="column">aero/alpha-deg</independentVar>
      <independentVar lookup="table">aero/beta-deg</independentVar>
      <tableData breakPoint="0.00000">
                -10.00      0.00     10.00     20.00     30.00     40.00     50.00
        0.20000  -0.00087  -0.01534  -0.00728   0.28395   0.39024   0.41645   0.39762
        0.60000  -0.03169  -0.01620   0.02392   0.31557   0.41351   0.42186   0.41167
        0.88000  -0.17579  -0.01701   0.16897   0.36094   0.42281   0.42163   0.41984
        0.92000  -0.21732  -0.01668   0.21207   0.36233   0.42282   0.42161   0.41987
        0.96000  -0.26512  -0.01526   0.25951   0.36149   0.42266   0.42284   0.42969
        0.98000  -0.28452  -0.01298   0.28514   0.35756   0.42215   0.42242   0.42007
        1.01000  -0.34089  -0.00511   0.35243   0.35305   0.41960   0.42397   0.42210
      </tableData>

    </table>
  </function>

  <function name="aero/CL_slats">
    <interpolate1d>
      <property>fcs/surfaces/slats-pos-deg</property>
      <value>0</value> <value>0</value>
      <value>27.5</value> <property>aero/CL_slats_27.5</property>
    </interpolate1d>
  </function>

  <!-- CDTOT -->
  <!-- base -->
  <function name="aero/CDtot_base">
    <table>
      <independentVar lookup="row">velocities/mach</independentVar>
      <independentVar lookup="column">aero/alpha-deg</independentVar>
      <independentVar lookup="table">aero/beta-deg</independentVar>
      <tableData breakPoint="-10.00000">
                -10.00      0.00     10.00     20.00     30.00     40.00     50.00
        0.20000   0.06155   0.02534   0.06338   0.12669   0.19528   0.29209   0.44305
        0.60000   0.06878   0.02575   0.07199   0.13863   0.21599   0.32744   0.50611
        0.88000   0.08389   0.02674   0.09024   0.16210   0.26213   0.40432   0.63557
        0.92000   0.08768   0.02705   0.09546   0.16996   0.27662   0.42414   0.66076
        0.96000   0.09258   0.02749   0.10247   0.18098   0.29898   0.45158   0.68081
        0.98000   0.09642   0.02777   0.10764   0.18604   0.32025   0.47935   0.69090
        1.01000   0.19470   0.03582   0.18931   0.37646   0.59287   0.83480   1.15643
      </tableData>

      <tableData breakPoint="0.00000">
                -10.00      0.00     10.00     20.00     30.00     40.00     50.00
        0.20000   0.06224   0.02240   0.06179   0.12403   0.18916   0.28288   0.43891
        0.60000   0.06998   0.02240   0.06930   0.13538   0.20832   0.31709   0.50145
        0.88000   0.08466   0.02241   0.08361   0.15878   0.24771   0.38223   0.61621
        0.92000   0.08856   0.02241   0.08720   0.16535   0.25759   0.39431   0.62855
        0.96000   0.09367   0.02241   0.09167   0.17403   0.26798   0.39814   0.60804
        0.98000   0.09729   0.02241   0.09453   0.17916   0.26903   0.37960   0.54562
        1.01000   0.18178   0.02240   0.17907   0.36989   0.59161   0.84715   1.19129
      </tableData>

      <tableData breakPoint="10.00000">
                -10.00      0.00     10.00     20.00     30.00     40.00     50.00
        0.20000   0.06149   0.02532   0.06346   0.12672   0.19527   0.29223   0.44326
        0.60000   0.06870   0.02573   0.07204   0.13868   0.21594   0.32761   0.50606
        0.88000   0.08382   0.02674   0.09015   0.16203   0.26226   0.40453   0.63617
        0.92000   0.08755   0.02705   0.09534   0.16982   0.27667   0.42426   0.66123
        0.96000   0.09248   0.02749   0.10233   0.18086   0.29906   0.45169   0.68108
        0.98000   0.09629   0.02777   0.10740   0.18632   0.32040   0.47951   0.69104
        1.01000   0.19472   0.03582   0.18930   0.37678   0.59247   0.83452   1.15665
      </tableData>

    </table>
  </function>

  <!-- elevator -->
  <function name="aero/CDtot_elevator_-24">
    <table>
      <independentVar lookup="row">velocities/mach</independentVar>
      <independentVar lookup="column">aero/alpha-deg</independentVar>
      <independentVar lookup="table">aero/beta-deg</independentVar>
      <tableData breakPoint="0.00000">
                -10.00      0.00     10.00     20.00     30.00     40.00     50.00
        0.20000   0.04558   0.02586  -0.03547  -0.03901  -0.05733  -0.06925  -0.08039
        0.60000   0.04749   0.02731  -0.04504  -0.04219  -0.06275  -0.07679  -0.08691
        0.88000   0.05261   0.03129  -0.06828  -0.04638  -0.07617  -0.09504  -0.09775
        0.92000   0.05375   0.03262  -0.07450  -0.04704  -0.08082  -0.10264  -0.09907
        0.96000   0.05485   0.03460  -0.08510  -0.04741  -0.08696  -0.11218  -0.09901
        0.98000   0.05427   0.03615  -0.09550  -0.04699  -0.09195  -0.12902  -0.09718
        1.01000   0.10670   0.07998   0.03408  -0.03866  -0.12142  -0.19756  -0.23971
      </tableData>

    </table>
  </function>

  <function name="aero/CDtot_elevator_-9.5">
    <table>
      <independentVar lookup="row">velocities/mach</independentVar>
      <independentVar lookup="column">aero/alpha-deg</independentVar>
      <independentVar lookup="table">aero/beta-deg</independentVar>
      <tableData breakPoint="0.00000">
                -10.00      0.00     10.00     20.00     30.00     40.00     50.00
        0.20000   0.01960   0.00701  -0.01124  -0.02615  -0.02615  -0.02552  -0.03702
        0.60000   0.02091   0.00833  -0.01311  -0.02955  -0.02849  -0.02775  -0.04130
        0.88000   0.02428   0.01158  -0.01746  -0.03629  -0.03466  -0.02959  -0.04407
        0.92000   0.02520   0.01242  -0.01820  -0.03858  -0.03740  -0.02882  -0.04118
        0.96000   0.02644   0.01351  -0.01865  -0.04228  -0.04276  -0.02692  -0.03430
        0.98000   0.02713   0.01425  -0.01840  -0.04581  -0.04831  -0.02091  -0.02335
        1.01000   0.04997   0.03072  -0.01167  -0.07466  -0.10900  -0.06343  -0.05576
      </tableData>

    </table>
  </function>

  <function name="aero/CDtot_elevator_-3">
    <table>
      <independentVar lookup="row">velocities/mach</independentVar>
      <independentVar lookup="column">aero/alpha-deg</independentVar>
      <independentVar lookup="table">aero/beta-deg</independentVar>
      <tableData breakPoint="0.00000">
                -10.00      0.00     10.00     20.00     30.00     40.00     50.00
        0.20000   0.00598   0.00075  -0.00520  -0.01023  -0.00681  -0.00948  -0.01471
        0.60000   0.00672   0.00091  -0.00618  -0.01168  -0.00745  -0.01025  -0.02351
        0.88000   0.00866   0.00132  -0.00869  -0.01427  -0.00788  -0.01033  -0.01496
        0.92000   0.00910   0.00147  -0.00938  -0.01512  -0.00764  -0.00974  -0.01338
        0.96000   0.01017   0.00170  -0.01021  -0.01718  -0.00708  -0.00906  -0.00977
        0.98000   0.01072   0.00189  -0.01074  -0.01913  -0.00595  -0.00589  -0.00482
        1.01000   0.02090   0.00449  -0.01426  -0.03661  -0.01983  -0.01496  -0.02098
      </tableData>

    </table>
  </function>

  <function name="aero/CDtot_elevator_1.5">
    <table>
      <independentVar lookup="row">velocities/mach</independentVar>
      <independentVar lookup="column">aero/alpha-deg</independentVar>
      <independentVar lookup="table">aero/beta-deg</independentVar>
      <tableData breakPoint="0.00000">
                -10.00      0.00     10.00     20.00     30.00     40.00     50.00
        0.20000  -0.00200   0.00017   0.00354   0.00450   0.00407   0.00556   0.00834
        0.60000  -0.00267   0.00021   0.00466   0.00408   0.00434   0.00583   0.00889
        0.88000  -0.00369   0.00032   0.00644   0.00447   0.00476   0.00584   0.00829
        0.92000  -0.00400   0.00036   0.00755   0.00463   0.00465   0.00561   0.00747
        0.96000  -0.00443   0.00044   0.00794   0.00487   0.00408   0.00292   0.00413
        0.98000  -0.00470   0.00050   0.00822   0.00501   0.00326   0.00228   0.00048
        1.01000  -0.00818   0.00114   0.01209   0.01785   0.00630   0.00810   0.01147
      </tableData>

    </table>
  </function>

  <function name="aero/CDtot_elevator">
    <interpolate1d>
      <property>fcs/surfaces/elevator-pos-deg</property>
      <value>-24</value> <property>aero/CDtot_elevator_-24</property>
      <value>-9.5</value> <property>aero/CDtot_elevator_-9.5</property>
      <value>-3</value> <property>aero/CDtot_elevator_-3</property>
      <value>0</value> <value>0</value>
      <value>1.5</value> <property>aero/CDtot_elevator_1.5</property>
    </interpolate1d>
  </function>

  <!-- flaps -->
  <function name="aero/CDtot_flaps_20">
    <table>
      <independentVar lookup="row">velocities/mach</independentVar>
      <independentVar lookup="column">aero/alpha-deg</independentVar>
      <independentVar lookup="table">aero/beta-deg</independentVar>
      <tableData breakPoint="0.00000">
                -10.00      0.00     10.00     20.00     30.00     40.00     50.00
        0.20000  -0.02428   0.01656   0.05561   0.09260   0.14194   0.21743   0.32689
        0.60000  -0.02921   0.02111   0.06800   0.10344   0.16152   0.25372   0.39506
        0.88000  -0.03754   0.03693   0.09331   0.12895   0.20677   0.33402   0.52111
        0.92000  -0.03970   0.04419   0.10052   0.13723   0.21943   0.35236   0.53879
        0.96000  -0.04266   0.05823   0.11357   0.15029   0.23517   0.36697   0.53954
        0.98000  -0.04465   0.07342   0.12367   0.15987   0.24323   0.36952   0.51068
        1.01000   0.09505   0.16135   0.22413   0.29774   0.45018   0.70276   0.97513
      </tableData>

    </table>
  </function>

  <function name="aero/CDtot_flaps_30">
    <table>
      <independentVar lookup="row">velocities/mach</independentVar>
      <independentVar lookup="column">aero/alpha-deg</independentVar>
      <independentVar lookup="table">aero/beta-deg</independentVar>
      <tableData breakPoint="0.00000">
                -10.00      0.00     10.00     20.00     30.00     40.00     50.00
        0.20000  -0.02418   0.03076   0.07712   0.10315   0.15094   0.22652   0.33601
        0.60000  -0.02910   0.03921   0.08764   0.11462   0.17123   0.26352   0.40583
        0.88000  -0.03673   0.06851   0.11088   0.14272   0.22041   0.35885   0.53773
        0.92000  -0.03820   0.08189   0.11934   0.15268   0.23502   0.37135   0.55857
        0.96000  -0.03914   0.09964   0.13428   0.16858   0.25334   0.39049   0.56277
        0.98000  -0.03837   0.11380   0.14543   0.18105   0.26416   0.39760   0.53898
        1.01000   0.16386   0.25758   0.28089   0.33524   0.47701   0.73249   1.00307
      </tableData>

    </table>
  </function>

  <function name="aero/CDtot_flaps">
    <interpolate1d>
      <property>fcs/surfaces/flaps-pos-deg</property>
      <value>0</value> <value>0</value>
      <value>20</value> <property>aero/CDtot_flaps_20</property>
      <value>30</value> <property>aero/CDtot_flaps_30</property>
    </interpolate1d>
  </function>

  <!-- left-flaperon -->
  <function name="aero/CDtot_left-flaperon_-51">
    <table>
      <independentVar lookup="row">velocities/mach</independentVar>
      <independentVar lookup="column">aero/alpha-deg</independentVar>
      <independentVar lookup="table">aero/beta-deg</independentVar>
      <tableData breakPoint="0.00000">
                -10.00      0.00     10.00     20.00     30.00     40.00     50.00
        0.20000   0.00966   0.00553  -0.01023  -0.00628  -0.00680  -0.00722  -0.00778
        0.60000   0.00901   0.00699  -0.01225  -0.00760  -0.00807  -0.00925  -0.01010
        0.88000   0.00943   0.01212  -0.01517  -0.01056  -0.01215  -0.01546  -0.01942
        0.92000   0.01001   0.01421  -0.01567  -0.01173  -0.01401  -0.01823  -0.02315
        0.96000   0.01128   0.01799  -0.01628  -0.01399  -0.01755  -0.02479  -0.03198
        0.98000   0.01279   0.02058  -0.01734  -0.01665  -0.02187  -0.03165  -0.04449
        1.01000   0.03303   0.07560   0.07201   0.02893   0.02765   0.02650   0.02859
      </tableData>

    </table>
  </function>

  <function name="aero/CDtot_left-flaperon">
    <interpolate1d>
      <property>fcs/surfaces/left-flaperon-pos-deg</property>
      <value>-51</value> <property>aero/CDtot_left-flaperon_-51</property>
      <value>0</value> <value>0</value>
    </interpolate1d>
  </function>

  <!-- right-flaperon -->
  <function name="aero/CDtot_right-flaperon_-51">
    <table>
      <independentVar lookup="row">velocities/mach</independentVar>
      <independentVar lookup="column">aero/alpha-deg</independentVar>
      <independentVar lookup="table">aero/beta-deg</independentVar>
      <tableData breakPoint="0.00000">
                -10.00      0.00     10.00     20.00     30.00     40.00     50.00
        0.20000   0.00954   0.00550  -0.01029  -0.00624  -0.00677  -0.00720  -0.00767
        0.60000   0.00898   0.00697  -0.01230  -0.00759  -0.00807  -0.00922  -0.01016
        0.88000   0.00943   0.01202  -0.01511  -0.01056  -0.01217  -0.01550  -0.01963
        0.92000   0.00991   0.01426  -0.01568  -0.01172  -0.01403  -0.01826  -0.02317
        0.96000   0.01133   0.01795  -0.01619  -0.01400  -0.01763  -0.02480  -0.03211
        0.98000   0.01280   0.02060  -0.01720  -0.01660  -0.02198  -0.03166  -0.04464
        1.01000   0.03291   0.07559   0.07202   0.02891   0.02734   0.02600   0.02839
      </tableData>

    </table>
  </function>

  <function name="aero/CDtot_right-flaperon">
    <interpolate1d>
      <property>fcs/surfaces/right-flaperon-pos-deg</property>
      <value>-51</value> <property>aero/CDtot_right-flaperon_-51</property>
      <value>0</value> <value>0</value>
    </interpolate1d>
  </function>

  <!-- rudder -->
  <function name="aero/CDtot_rudder_-35">
    <table>
      <independentVar lookup="row">velocities/mach</independentVar>
      <independentVar lookup="column">aero/alpha-deg</independentVar>
      <independentVar lookup="table">aero/beta-deg</independentVar>
      <tableData breakPoint="-10.00000">
                -10.00      0.00     10.00     20.00     30.00     40.00     50.00
        0.20000   0.00147  -0.00070   0.00147  -0.00421  -0.00637  -0.00685  -0.00626
        0.60000   0.00273  -0.00073   0.00116  -0.00420  -0.00683  -0.00690  -0.00745
        0.88000   0.01025   0.00000  -0.00291   0.00217  -0.00515  -0.00598  -0.00751
        0.92000   0.01283   0.00044  -0.00364   0.00346  -0.00493  -0.00606  -0.00809
        0.96000   0.01016   0.00556  -0.00456   0.00517  -0.00432  -0.00690  -0.00914
        0.98000   0.02447   0.00265  -0.00501   0.00915  -0.00408  -0.00797  -0.01099
        1.01000   0.01342   0.02106  -0.00232   0.01968   0.00851   0.00129  -0.00541
      </tableData>

      <tableData breakPoint="0.00000">
                -10.00      0.00     10.00     20.00     30.00     40.00     50.00
        0.20000   0.00690   0.00738   0.00607   0.00451   0.00507   0.00454   0.00288
        0.60000   0.00905   0.00917   0.00770   0.00599   0.00428   0.00566   0.00351
        0.88000   0.01432   0.01149   0.01360   0.01278   0.01133   0.00893   0.00643
        0.92000   0.01967   0.01734   0.01543   0.01479   0.01307   0.01050   0.00784
        0.96000   0.01752   0.01964   0.01856   0.01825   0.01590   0.01183   0.00898
        0.98000   0.02072   0.02165   0.02052   0.02057   0.01771   0.01420   0.01032
        1.01000   0.03864   0.04127   0.04080   0.03778   0.03138   0.02401   0.01695
      </tableData>

      <tableData breakPoint="10.00000">
                -10.00      0.00     10.00     20.00     30.00     40.00     50.00
        0.20000   0.01124   0.01430   0.00955   0.00070   0.00758   0.00944   0.00941
        0.60000   0.01629   0.01711   0.01002   0.00189   0.00862   0.01207   0.01403
        0.88000   0.01209   0.02413   0.02420   0.01396   0.01558   0.01793   0.01672
        0.92000   0.01056   0.01212  -0.01336   0.01172   0.01622   0.01932   0.01800
        0.96000   0.01397   0.01759   0.02760   0.00513   0.01640   0.02116   0.02148
        0.98000   0.01870   0.03089   0.02977   0.00389   0.01550   0.02327   0.02272
        1.01000   0.03780   0.04287   0.00143   0.02842   0.02958   0.02847   0.02347
      </tableData>

    </table>
  </function>

  <function name="aero/CDtot_rudder_35">
    <table>
      <independentVar lookup="row">velocities/mach</independentVar>
      <independentVar lookup="column">aero/alpha-deg</independentVar>
      <independentVar lookup="table">aero/beta-deg</independentVar>
      <tableData breakPoint="-10.00000">
                -10.00      0.00     10.00     20.00     30.00     40.00     50.00
        0.20000   0.01102   0.01425   0.00994   0.00379   0.00755   0.00960   0.00917
        0.60000   0.01187   0.01722   0.01428   0.00452   0.00764   0.01492   0.01153
        0.88000   0.01210   0.02405   0.02370   0.01374   0.01567   0.01804   0.01707
        0.92000   0.01090   0.01280  -0.01212   0.01164   0.01619   0.01913   0.01800
        0.96000   0.01375   0.01685   0.02582   0.00499   0.01636   0.02101   0.02140
        0.98000   0.01857   0.03092   0.03002   0.00406   0.01569   0.02316   0.02277
        1.01000   0.03781   0.04287   0.00187   0.02886   0.02939   0.02822   0.02369
      </tableData>

      <tableData breakPoint="0.00000">
                -10.00      0.00     10.00     20.00     30.00     40.00     50.00
        0.20000   0.00714   0.00749   0.00549   0.00589   0.00593   0.00463   0.00251
        0.60000   0.00780   0.01109   0.00989   0.00738   0.00861   0.00567   0.00301
        0.88000   0.01403   0.01435   0.01368   0.01278   0.01129   0.00894   0.00610
        0.92000   0.01729   0.01701   0.01541   0.01479   0.01278   0.01018   0.00696
        0.96000   0.01761   0.01977   0.01851   0.01819   0.01581   0.01152   0.00852
        0.98000   0.02072   0.02169   0.02046   0.02050   0.01760   0.01389   0.01015
        1.01000   0.03863   0.04126   0.04080   0.03780   0.03134   0.02467   0.01694
      </tableData>

      <tableData breakPoint="10.00000">
                -10.00      0.00     10.00     20.00     30.00     40.00     50.00
        0.20000   0.00157  -0.00065   0.00220  -0.00424  -0.00588  -0.00657  -0.00626
        0.60000   0.00061  -0.00078   0.00173  -0.00464  -0.00616  -0.00602  -0.00651
        0.88000   0.01022   0.00000  -0.00302   0.00224  -0.00550  -0.00620  -0.00786
        0.92000   0.01288   0.00045  -0.00365   0.00382  -0.00499  -0.00621  -0.00833
        0.96000   0.00972   0.00591  -0.00445   0.00549  -0.00440  -0.00708  -0.00922
        0.98000   0.02459   0.00266  -0.00445   0.00857  -0.00407  -0.00796  -0.01128
        1.01000   0.01341   0.02107  -0.00282   0.01934   0.00872   0.00163  -0.00556
      </tableData>

    </table>
  </function>

  <function name="aero/CDtot_rudder">
    <interpolate1d>
      <property>fcs/surfaces/rudder-pos-deg</property>
      <value>-35</value> <property>aero/CDtot_rudder_-35</property>
      <value>0</value> <value>0</value>
      <value>35</value> <property>aero/CDtot_rudder_35</property>
    </interpolate1d>
  </function>

  <!-- slats -->
  <function name="aero/CDtot_slats_27.5">
    <table>
      <independentVar lookup="row">velocities/mach</independentVar>
      <independentVar lookup="column">aero/alpha-deg</independentVar>
      <independentVar lookup="table">aero/beta-deg</independentVar>
      <tableData breakPoint="0.00000">
                -10.00      0.00     10.00     20.00     30.00     40.00     50.00
        0.20000   0.00137   0.00000  -0.00128   0.02946   0.05998   0.09231   0.13234
        0.60000   0.00348   0.00000   0.00013   0.03518   0.06912   0.10337   0.15086
        0.88000   0.01665   0.00000   0.01104   0.04543   0.08574   0.12561   0.18605
        0.92000   0.02169   0.00000   0.01550   0.04784   0.08966   0.13037   0.19074
        0.96000   0.02905   0.00000   0.02242   0.05063   0.09440   0.13295   0.18997
        0.98000   0.03378   0.00000   0.02796   0.05179   0.09637   0.13272   0.18593
        1.01000   0.17159   0.04135   0.00766   0.05197   0.14464   0.22373   0.30804
      </tableData>

    </table>
  </function>

  <function name="aero/CDtot_slats">
    <interpolate1d>
      <property>fcs/surfaces/slats-pos-deg</property>
      <value>0</value> <value>0</value>
      <value>27.5</value> <property>aero/CDtot_slats_27.5</property>
    </interpolate1d>
  </function>

  <!-- CS -->
  <!-- base -->
  <function name="aero/CS_base">
    <table>
      <independentVar lookup="row">velocities/mach</independentVar>
      <independentVar lookup="column">aero/alpha-deg</independentVar>
      <independentVar lookup="table">aero/beta-deg</independentVar>
      <tableData breakPoint="-10.00000">
                -10.00      0.00     10.00     20.00     30.00     40.00     50.00
        0.20000   0.03218   0.05528   0.04172   0.01782  -0.02852  -0.08709  -0.14196
        0.60000   0.03291   0.05841   0.04746   0.02401  -0.02874  -0.08565  -0.15107
        0.88000   0.03632   0.06596   0.06042   0.01713  -0.02462  -0.09846  -0.18554
        0.92000   0.03804   0.06867   0.05927   0.02554  -0.03300  -0.10863  -0.17201
        0.96000   0.03925   0.07171   0.06172   0.03388  -0.04629  -0.10064  -0.17701
        0.98000   0.03867   0.07348   0.06227   0.03704  -0.04354  -0.10721  -0.18699
        1.01000   0.04314   0.07539   0.05177   0.02787  -0.02595  -0.09149  -0.15669
      </tableData>

      <tableData breakPoint="0.00000">
                -10.00      0.00     10.00     20.00     30.00     40.00     50.00
        0.20000   0.00018   0.00000  -0.00024  -0.00045   0.00000  -0.00096  -0.00040
        0.60000   0.00000   0.00000  -0.00014  -0.00027   0.00028   0.00049  -0.00148
        0.88000   0.00000   0.00000  -0.00023  -0.00012  -0.00022   0.00213   0.00188
        0.92000  -0.00010   0.00000   0.00000   0.00000   0.00020   0.00405  -0.00133
        0.96000   0.00000   0.00000   0.00000   0.00010   0.00037   0.01551   0.02158
        0.98000   0.00000   0.00000  -0.00046   0.00000  -0.00026   0.00790  -0.00051
        1.01000   0.00000   0.00000   0.00000   0.00000   0.00000   0.00045   0.00039
      </tableData>

      <tableData breakPoint="10.00000">
                -10.00      0.00     10.00     20.00     30.00     40.00     50.00
        0.20000  -0.03283  -0.05530  -0.04136  -0.01813   0.02799   0.08798   0.14388
        0.60000  -0.03410  -0.05848  -0.04723  -0.02288   0.02908   0.08580   0.15129
        0.88000  -0.03722  -0.06600  -0.06081  -0.01656   0.02493   0.09830   0.18956
        0.92000  -0.03880  -0.06869  -0.05922  -0.02526   0.03286   0.10733   0.17377
        0.96000  -0.03915  -0.07171  -0.06117  -0.03350   0.04622   0.10157   0.17764
        0.98000  -0.03854  -0.07348  -0.06190  -0.03608   0.04381   0.10827   0.18704
        1.01000  -0.04312  -0.07539  -0.05184  -0.02789   0.02568   0.09122   0.15660
      </tableData>

    </table>
  </function>

  <!-- elevator -->
  <function name="aero/CS_elevator_-24">
    <table>
      <independentVar lookup="row">velocities/mach</independentVar>
      <independentVar lookup="column">aero/alpha-deg</independentVar>
      <independentVar lookup="table">aero/beta-deg</independentVar>
      <tableData breakPoint="0.00000">
                -10.00      0.00     10.00     20.00     30.00     40.00     50.00
        0.20000  -0.00018  -0.00219   0.00010   0.00058  -0.00064   0.00134  -0.00133
        0.60000   0.00000   0.00059   0.00027   0.00000  -0.00083   0.00632   0.00213
        0.88000   0.00000  -0.00020  -0.00022   0.00012   0.00022  -0.01415  -0.00172
        0.92000   0.00010   0.00000  -0.00079   0.00000  -0.00020  -0.00173   0.00308
        0.96000   0.00000   0.00000  -0.00024  -0.00010  -0.00018  -0.04520  -0.02260
        0.98000   0.00000   0.00000   0.00046   0.00000   0.00026  -0.00697  -0.00695
        1.01000   0.00000   0.00000   0.00085   0.00018  -0.00033   0.00358  -0.00191
      </tableData>

    </table>
  </function>

  <function name="aero/CS_elevator_-9.5">
    <table>
      <independentVar lookup="row">velocities/mach</independentVar>
      <independentVar lookup="column">aero/alpha-deg</independentVar>
      <independentVar lookup="table">aero/beta-deg</independentVar>
      <tableData breakPoint="0.00000">
                -10.00      0.00     10.00     20.00     30.00     40.00     50.00
        0.20000  -0.00018  -0.00000   0.00000   0.00161   0.00023   0.00084   0.00093
        0.60000   0.00000  -0.00000   0.00014   0.00124  -0.00038  -0.00087   0.00148
        0.88000   0.00000   0.00000   0.00000  -0.00082   0.00105  -0.00279  -0.00278
        0.92000   0.00010   0.00000  -0.00075   0.00000   0.00242  -0.00458   0.00133
        0.96000  -0.00000   0.00000  -0.00061  -0.00046  -0.00017  -0.01430  -0.02096
        0.98000   0.00000   0.00000   0.00030   0.00000   0.00103  -0.00747   0.00014
        1.01000   0.00017  -0.00000   0.00000   0.00066  -0.00029  -0.00045  -0.02721
      </tableData>

    </table>
  </function>

  <function name="aero/CS_elevator_-3">
    <table>
      <independentVar lookup="row">velocities/mach</independentVar>
      <independentVar lookup="column">aero/alpha-deg</independentVar>
      <independentVar lookup="table">aero/beta-deg</independentVar>
      <tableData breakPoint="0.00000">
                -10.00      0.00     10.00     20.00     30.00     40.00     50.00
        0.20000   0.00000  -0.00000   0.00044   0.00045   0.00000   0.00196   0.00148
        0.60000  -0.00164   0.00000   0.00097   0.00012   0.00039   0.00313   0.03410
        0.88000   0.00263   0.00000   0.00023   0.00012   0.00022  -0.00539  -0.00302
        0.92000   0.00095   0.00000   0.00019   0.00000  -0.00031  -0.00669   0.00115
        0.96000  -0.00034   0.00000   0.00080   0.00027  -0.00076  -0.01689  -0.02146
        0.98000  -0.00012   0.00000   0.00080   0.00015  -0.00061  -0.00832  -0.00046
        1.01000   0.00045   0.00000   0.00000   0.00000  -0.00164   0.00243  -0.00099
      </tableData>

    </table>
  </function>

  <function name="aero/CS_elevator_1.5">
    <table>
      <independentVar lookup="row">velocities/mach</independentVar>
      <independentVar lookup="column">aero/alpha-deg</independentVar>
      <independentVar lookup="table">aero/beta-deg</independentVar>
      <tableData breakPoint="0.00000">
                -10.00      0.00     10.00     20.00     30.00     40.00     50.00
        0.20000  -0.01180   0.00041   0.00036   0.00324  -0.00070  -0.00496   0.00040
        0.60000  -0.00042   0.00026  -0.02649   0.00152   0.00000  -0.00113   0.00000
        0.88000  -0.00048   0.00019   0.02122  -0.00033  -0.00534  -0.00227  -0.00070
        0.92000   0.00059   0.00000  -0.02000  -0.00036   0.00071   0.00736   0.00334
        0.96000  -0.00029   0.00000   0.00127   0.00049   0.00020  -0.00808  -0.02952
        0.98000  -0.00038  -0.00015  -0.00194   0.00178  -0.00547  -0.03077  -0.00188
        1.01000   0.00000   0.00000   0.00000   0.00000   0.00062   0.00051  -0.00013
      </tableData>

    </table>
  </function>

  <function name="aero/CS_elevator">
    <interpolate1d>
      <property>fcs/surfaces/elevator-pos-deg</property>
      <value>-24</value> <property>aero/CS_elevator_-24</property>
      <value>-9.5</value> <property>aero/CS_elevator_-9.5</property>
      <value>-3</value> <property>aero/CS_elevator_-3</property>
      <value>0</value> <value>0</value>
      <value>1.5</value> <property>aero/CS_elevator_1.5</property>
    </interpolate1d>
  </function>

  <!-- flaps -->
  <function name="aero/CS_flaps_20">
    <table>
      <independentVar lookup="row">velocities/mach</independentVar>
      <independentVar lookup="column">aero/alpha-deg</independentVar>
      <independentVar lookup="table">aero/beta-deg</independentVar>
      <tableData breakPoint="0.00000">
                -10.00      0.00     10.00     20.00     30.00     40.00     50.00
        0.20000   0.00028   0.00000  -0.00051  -0.00010   0.00000   0.00022   0.00029
        0.60000   0.00023   0.00000   0.00137  -0.00052  -0.00028   0.00073   0.00049
        0.88000   0.00000  -0.00016  -0.00033  -0.00012  -0.00095   0.00321   0.00000
        0.92000   0.00010   0.00022   0.01215   0.00078   0.00023  -0.01523   0.00133
        0.96000   0.00000  -0.00051  -0.00034   0.00010   0.00000  -0.01707  -0.02227
        0.98000  -0.00000  -0.00010   0.00057   0.00014  -0.00014  -0.00790   0.00039
        1.01000   0.00000   0.00000   0.00000   0.00000   0.00000   0.00053   0.00000
      </tableData>

    </table>
  </function>

  <function name="aero/CS_flaps_30">
    <table>
      <independentVar lookup="row">velocities/mach</independentVar>
      <independentVar lookup="column">aero/alpha-deg</independentVar>
      <independentVar lookup="table">aero/beta-deg</independentVar>
      <tableData breakPoint="0.00000">
                -10.00      0.00     10.00     20.00     30.00     40.00     50.00
        0.20000   0.00089   0.00000   0.00000   0.00034   0.00000   0.00096   0.00040
        0.60000   0.00042  -0.00031  -0.00057  -0.00024  -0.00028   0.00083   0.00058
        0.88000   0.00000   0.00000  -0.00181   0.00027   0.00000  -0.03860   0.00010
        0.92000   0.00010   0.00040   0.00146   0.00000   0.00032  -0.01008   0.00156
        0.96000  -0.00011  -0.00038  -0.00037  -0.00010   0.00000  -0.01564  -0.02215
        0.98000  -0.00000  -0.00018   0.00107   0.00045   0.00000  -0.00833   0.00112
        1.01000   0.00000   0.00000   0.00011   0.00000   0.00000   0.00075  -0.00010
      </tableData>

    </table>
  </function>

  <function name="aero/CS_flaps">
    <interpolate1d>
      <property>fcs/surfaces/flaps-pos-deg</property>
      <value>0</value> <value>0</value>
      <value>20</value> <property>aero/CS_flaps_20</property>
      <value>30</value> <property>aero/CS_flaps_30</property>
    </interpolate1d>
  </function>

  <!-- left-flaperon -->
  <function name="aero/CS_left-flaperon_-51">
    <table>
      <independentVar lookup="row">velocities/mach</independentVar>
      <independentVar lookup="column">aero/alpha-deg</independentVar>
      <independentVar lookup="table">aero/beta-deg</independentVar>
      <tableData breakPoint="0.00000">
                -10.00      0.00     10.00     20.00     30.00     40.00     50.00
        0.20000   0.00904   0.01164   0.00280  -0.00551  -0.01254  -0.01230  -0.00998
        0.60000   0.00939   0.01364   0.00327  -0.00671  -0.01387  -0.01584  -0.00905
        0.88000   0.01069   0.01899   0.00885  -0.00974  -0.01302  -0.01354  -0.01183
        0.92000   0.01222   0.02123   0.00890  -0.01043  -0.01504  -0.01574  -0.00859
        0.96000   0.01247   0.01409   0.01496  -0.00935  -0.01612  -0.02483  -0.02609
        0.98000   0.01385   0.02140   0.01916  -0.01021  -0.01717  -0.01680  -0.00467
        1.01000   0.01749   0.02515   0.01853  -0.00997  -0.02178  -0.01221  -0.00714
      </tableData>

    </table>
  </function>

  <function name="aero/CS_left-flaperon">
    <interpolate1d>
      <property>fcs/surfaces/left-flaperon-pos-deg</property>
      <value>-51</value> <property>aero/CS_left-flaperon_-51</property>
      <value>0</value> <value>0</value>
    </interpolate1d>
  </function>

  <!-- right-flaperon -->
  <function name="aero/CS_right-flaperon_-51">
    <table>
      <independentVar lookup="row">velocities/mach</independentVar>
      <independentVar lookup="column">aero/alpha-deg</independentVar>
      <independentVar lookup="table">aero/beta-deg</independentVar>
      <tableData breakPoint="0.00000">
                -10.00      0.00     10.00     20.00     30.00     40.00     50.00
        0.20000  -0.00868  -0.01117  -0.00123   0.00649   0.01269   0.01418   0.01053
        0.60000  -0.00907  -0.01311  -0.00121   0.00675   0.01285   0.01540   0.01126
        0.88000  -0.01073  -0.01901  -0.00859   0.00985   0.01412   0.01035   0.01039
        0.92000  -0.01205  -0.02086  -0.00830   0.01069   0.01488   0.00846   0.00928
        0.96000  -0.01228  -0.01398  -0.01515   0.00924   0.01576  -0.00418  -0.01494
        0.98000  -0.01408  -0.02115  -0.01804   0.01027   0.01722   0.00077   0.00658
        1.01000  -0.01717  -0.02512  -0.01858   0.00993   0.02179   0.01224   0.00720
      </tableData>

    </table>
  </function>

  <function name="aero/CS_right-flaperon">
    <interpolate1d>
      <property>fcs/surfaces/right-flaperon-pos-deg</property>
      <value>-51</value> <property>aero/CS_right-flaperon_-51</property>
      <value>0</value> <value>0</value>
    </interpolate1d>
  </function>

  <!-- rudder -->
  <function name="aero/CS_rudder_-35">
    <table>
      <independentVar lookup="row">velocities/mach</independentVar>
      <independentVar lookup="column">aero/alpha-deg</independentVar>
      <independentVar lookup="table">aero/beta-deg</independentVar>
      <tableData breakPoint="-10.00000">
                -10.00      0.00     10.00     20.00     30.00     40.00     50.00
        0.20000  -0.06111  -0.07474  -0.09597  -0.06177  -0.02428  -0.05298  -0.07921
        0.60000  -0.06851  -0.08090  -0.11546  -0.09496   0.00202  -0.06315  -0.04827
        0.88000  -0.10182  -0.10273  -0.15562  -0.13836  -0.12825  -0.11477  -0.10030
        0.92000  -0.10982  -0.11389  -0.14296  -0.14872  -0.13282  -0.11760  -0.10606
        0.96000  -0.19955  -0.12027  -0.16528  -0.15864  -0.13448  -0.12703  -0.10910
        0.98000  -0.15495  -0.17924  -0.20203  -0.16894  -0.13964  -0.13327  -0.11487
        1.01000  -0.18506  -0.19209  -0.20936  -0.20885  -0.19436  -0.17497  -0.15497
      </tableData>

      <tableData breakPoint="0.00000">
                -10.00      0.00     10.00     20.00     30.00     40.00     50.00
        0.20000  -0.06868  -0.07010  -0.05380  -0.03493  -0.07866  -0.04368  -0.02971
        0.60000  -0.08021  -0.08304  -0.07138  -0.09070  -0.10139  -0.06231  -0.03577
        0.88000  -0.09922  -0.10191  -0.09392  -0.08928  -0.08261  -0.07836  -0.06430
        0.92000  -0.12518  -0.09551  -0.10387  -0.09503  -0.08779  -0.08775  -0.07133
        0.96000  -0.10601  -0.10795  -0.10943  -0.12710  -0.10152  -0.11195  -0.10866
        0.98000  -0.11384  -0.11437  -0.11365  -0.11037  -0.10793  -0.11216  -0.09066
        1.01000  -0.13159  -0.13220  -0.13186  -0.13137  -0.12944  -0.12791  -0.11832
      </tableData>

      <tableData breakPoint="10.00000">
                -10.00      0.00     10.00     20.00     30.00     40.00     50.00
        0.20000  -0.06879  -0.05850  -0.03792  -0.02042  -0.05883  -0.03211   0.01127
        0.60000  -0.07766  -0.06171  -0.00496  -0.01975  -0.07752  -0.06957  -0.00433
        0.88000  -0.06174  -0.03460   0.03722   0.00373   0.00457  -0.01903  -0.03541
        0.92000  -0.03657   0.07475   0.15578   0.01823   0.00520  -0.03217  -0.03473
        0.96000   0.08354   0.07868   0.07708   0.02883  -0.00320  -0.03740  -0.04598
        0.98000  -0.04487  -0.02062   0.07886   0.05835   0.00765  -0.04240  -0.05016
        1.01000  -0.06832  -0.06144   0.08534  -0.02093  -0.03398  -0.05551  -0.06167
      </tableData>

    </table>
  </function>

  <function name="aero/CS_rudder_35">
    <table>
      <independentVar lookup="row">velocities/mach</independentVar>
      <independentVar lookup="column">aero/alpha-deg</independentVar>
      <independentVar lookup="table">aero/beta-deg</independentVar>
      <tableData breakPoint="-10.00000">
                -10.00      0.00     10.00     20.00     30.00     40.00     50.00
        0.20000   0.06912   0.05841   0.03793   0.02813   0.06378   0.04170  -0.00913
        0.60000   0.06942   0.06157   0.02095   0.04114   0.07133   0.02318   0.04117
        0.88000   0.06325   0.03729  -0.05052  -0.00166  -0.00591   0.02265   0.02586
        0.92000   0.04933  -0.07490  -0.14498  -0.01836  -0.00453   0.03131   0.03444
        0.96000  -0.08236  -0.07894  -0.08018  -0.03168   0.00398   0.03829   0.04643
        0.98000   0.04438   0.02075  -0.08211  -0.05921  -0.00692   0.04181   0.05539
        1.01000   0.06829   0.06144  -0.08517   0.02084   0.03449   0.05594   0.06184
      </tableData>

      <tableData breakPoint="0.00000">
                -10.00      0.00     10.00     20.00     30.00     40.00     50.00
        0.20000   0.06990   0.06925   0.04208   0.07333   0.03781   0.04478   0.03924
        0.60000   0.07017   0.09018   0.08466   0.04045   0.00865   0.05002   0.05611
        0.88000   0.09699   0.09233   0.09363   0.08953   0.08550   0.07567   0.06241
        0.92000   0.13609   0.09757   0.10280   0.09526   0.09041   0.08134   0.07782
        0.96000   0.10610   0.10821   0.10978   0.11336   0.10141   0.08475   0.06847
        0.98000   0.11357   0.11454   0.11733   0.10973   0.11130   0.10258   0.10548
        1.01000   0.13159   0.13222   0.13262   0.13070   0.12905   0.12354   0.11934
      </tableData>

      <tableData breakPoint="10.00000">
                -10.00      0.00     10.00     20.00     30.00     40.00     50.00
        0.20000   0.06262   0.07510   0.08806   0.07077   0.03255   0.05951   0.08267
        0.60000   0.05762   0.08029   0.08181   0.08660   0.02254   0.09259   0.08457
        0.88000   0.10225   0.10272   0.15037   0.13743   0.12862   0.11931   0.09673
        0.92000   0.11061   0.11388   0.14285   0.14903   0.13339   0.11759   0.10534
        0.96000   0.19970   0.11899   0.16726   0.15846   0.13500   0.12730   0.10881
        0.98000   0.15567   0.17923   0.19916   0.16722   0.13871   0.13550   0.12059
        1.01000   0.18504   0.19209   0.20952   0.20878   0.19463   0.17532   0.15525
      </tableData>

    </table>
  </function>

  <function name="aero/CS_rudder">
    <interpolate1d>
      <property>fcs/surfaces/rudder-pos-deg</property>
      <value>-35</value> <property>aero/CS_rudder_-35</property>
      <value>0</value> <value>0</value>
      <value>35</value> <property>aero/CS_rudder_35</property>
    </interpolate1d>
  </function>

  <!-- slats -->
  <function name="aero/CS_slats_27.5">
    <table>
      <independentVar lookup="row">velocities/mach</independentVar>
      <independentVar lookup="column">aero/alpha-deg</independentVar>
      <independentVar lookup="table">aero/beta-deg</independentVar>
      <tableData breakPoint="0.00000">
                -10.00      0.00     10.00     20.00     30.00     40.00     50.00
        0.20000   0.00000   0.00000   0.00010   0.00000   0.00000   0.00012   0.00000
        0.60000   0.00000   0.00000   0.00014   0.00013   0.00000   0.00000   0.00000
        0.88000   0.00000   0.00000   0.00000   0.00000   0.00000  -0.00015   0.00011
        0.92000   0.00000   0.00000   0.00000   0.00000   0.00010  -0.00029   0.00000
        0.96000   0.00037   0.00000   0.00000  -0.00010   0.00000  -0.00749  -0.01256
        0.98000   0.00000   0.00000   0.00000   0.00000   0.00000  -0.00423   0.00000
        1.01000   0.00000   0.00000   0.00000   0.00000   0.00000   0.00000   0.00000
      </tableData>

    </table>
  </function>

  <function name="aero/CS_slats">
    <interpolate1d>
      <property>fcs/surfaces/slats-pos-deg</property>
      <value>0</value> <value>0</value>
      <value>27.5</value> <property>aero/CS_slats_27.5</property>
    </interpolate1d>
  </function>

  <!-- CMX -->
  <!-- base -->
  <function name="aero/CMx_base">
    <table>
      <independentVar lookup="row">velocities/mach</independentVar>
      <independentVar lookup="column">aero/alpha-deg</independentVar>
      <independentVar lookup="table">aero/beta-deg</independentVar>
      <tableData breakPoint="-10.00000">
                -10.00      0.00     10.00     20.00     30.00     40.00     50.00
        0.20000   0.00913  -0.00132  -0.01374  -0.00766  -0.00717  -0.00492  -0.00153
        0.60000   0.00308  -0.00141  -0.00939  -0.00840  -0.00713  -0.00495  -0.00083
        0.88000  -0.00351  -0.00171  -0.00635  -0.00850  -0.00851  -0.00574  -0.00295
        0.92000  -0.00374  -0.00182  -0.00632  -0.00953  -0.00862  -0.00739  -0.00287
        0.96000  -0.00398  -0.00196  -0.00633  -0.00925  -0.01037  -0.00791  -0.00282
        0.98000  -0.00411  -0.00206  -0.00634  -0.00935  -0.01183  -0.00812  -0.00374
        1.01000  -0.00374  -0.00224  -0.00580  -0.00795  -0.00986  -0.00756  -0.00564
      </tableData>

      <tableData breakPoint="0.00000">
                -10.00      0.00     10.00     20.00     30.00     40.00     50.00
        0.20000  -0.00012  -0.00000   0.00000   0.00000  -0.00000   0.00000   0.00000
        0.60000   0.00000   0.00000   0.00000   0.00000   0.00000   0.00000   0.00000
        0.88000   0.00000  -0.00000   0.00000   0.00000   0.00000  -0.00015   0.00000
        0.92000   0.00000  -0.00000   0.00000   0.00000  -0.00000  -0.00025   0.00014
        0.96000  -0.00000  -0.00000   0.00000  -0.00000  -0.00000  -0.00107  -0.00216
        0.98000  -0.00000  -0.00000   0.00000  -0.00000   0.00000  -0.00056   0.00000
        1.01000  -0.00000  -0.00000   0.00000   0.00000   0.00000   0.00000   0.00000
      </tableData>

      <tableData breakPoint="10.00000">
                -10.00      0.00     10.00     20.00     30.00     40.00     50.00
        0.20000  -0.00913   0.00131   0.01377   0.00768   0.00718   0.00488   0.00149
        0.60000  -0.00307   0.00140   0.00939   0.00831   0.00711   0.00493   0.00082
        0.88000   0.00353   0.00171   0.00638   0.00842   0.00849   0.00574   0.00279
        0.92000   0.00376   0.00181   0.00632   0.00950   0.00861   0.00735   0.00277
        0.96000   0.00397   0.00197   0.00631   0.00921   0.01039   0.00786   0.00277
        0.98000   0.00412   0.00206   0.00633   0.00923   0.01183   0.00808   0.00369
        1.01000   0.00375   0.00224   0.00585   0.00797   0.00987   0.00758   0.00562
      </tableData>

    </table>
  </function>

  <!-- elevator -->
  <function name="aero/CMx_elevator_-24">
    <table>
      <independentVar lookup="row">velocities/mach</independentVar>
      <independentVar lookup="column">aero/alpha-deg</independentVar>
      <independentVar lookup="table">aero/beta-deg</independentVar>
      <tableData breakPoint="0.00000">
                -10.00      0.00     10.00     20.00     30.00     40.00     50.00
        0.20000   0.00012   0.00014   0.00000   0.00010   0.00000   0.00000   0.00014
        0.60000   0.00000   0.00000   0.00000   0.00000   0.00000  -0.00076   0.00000
        0.88000  -0.00000   0.00000   0.00000   0.00000   0.00000   0.00139   0.00000
        0.92000  -0.00000   0.00000   0.00000   0.00000   0.00000   0.00000  -0.00044
        0.96000   0.00000   0.00000   0.00000   0.00000   0.00000   0.00409   0.00216
        0.98000   0.00000   0.00000   0.00000   0.00000   0.00000   0.00041   0.00087
        1.01000   0.00000   0.00000   0.00000   0.00000   0.00011  -0.00013  -0.00043
      </tableData>

    </table>
  </function>

  <function name="aero/CMx_elevator_-9.5">
    <table>
      <independentVar lookup="row">velocities/mach</independentVar>
      <independentVar lookup="column">aero/alpha-deg</independentVar>
      <independentVar lookup="table">aero/beta-deg</independentVar>
      <tableData breakPoint="0.00000">
                -10.00      0.00     10.00     20.00     30.00     40.00     50.00
        0.20000   0.00012   0.00000   0.00000   0.00000   0.00000   0.00000   0.00000
        0.60000   0.00000   0.00000   0.00000   0.00000   0.00000   0.00000   0.00000
        0.88000   0.00000   0.00000   0.00000   0.00000   0.00000   0.00015   0.00010
        0.92000  -0.00000   0.00000   0.00000   0.00000  -0.00020   0.00025  -0.00014
        0.96000   0.00000   0.00000   0.00000   0.00000   0.00000   0.00107   0.00216
        0.98000   0.00000   0.00000   0.00000   0.00000   0.00000   0.00056   0.00000
        1.01000   0.00000   0.00000   0.00000   0.00000   0.00000   0.00000   0.00212
      </tableData>

    </table>
  </function>

  <function name="aero/CMx_elevator_-3">
    <table>
      <independentVar lookup="row">velocities/mach</independentVar>
      <independentVar lookup="column">aero/alpha-deg</independentVar>
      <independentVar lookup="table">aero/beta-deg</independentVar>
      <tableData breakPoint="0.00000">
                -10.00      0.00     10.00     20.00     30.00     40.00     50.00
        0.20000   0.00012   0.00000   0.00000   0.00000   0.00000   0.00000  -0.00000
        0.60000   0.00000   0.00000   0.00013   0.00000   0.00000  -0.00014  -0.00065
        0.88000  -0.00026   0.00000   0.00000   0.00000  -0.00000   0.00039   0.00000
        0.92000  -0.00019   0.00000   0.00000  -0.00000   0.00000   0.00044  -0.00014
        0.96000   0.00000   0.00000   0.00000   0.00000   0.00000   0.00107   0.00216
        0.98000   0.00000   0.00000   0.00000   0.00000   0.00000   0.00056   0.00000
        1.01000   0.00000   0.00000   0.00000   0.00000   0.00010  -0.00041   0.00000
      </tableData>

    </table>
  </function>

  <function name="aero/CMx_elevator_1.5">
    <table>
      <independentVar lookup="row">velocities/mach</independentVar>
      <independentVar lookup="column">aero/alpha-deg</independentVar>
      <independentVar lookup="table">aero/beta-deg</independentVar>
      <tableData breakPoint="0.00000">
                -10.00      0.00     10.00     20.00     30.00     40.00     50.00
        0.20000   0.00089   0.00000  -0.00000  -0.00028   0.00000   0.00038   0.00000
        0.60000   0.00000   0.00000   0.00189  -0.00010   0.00000   0.00000   0.00000
        0.88000   0.00000   0.00000  -0.00092   0.00000   0.00033   0.00015   0.00000
        0.92000   0.00000   0.00000   0.00038   0.00000   0.00000  -0.00053  -0.00026
        0.96000   0.00000   0.00000   0.00000   0.00000   0.00000   0.00052   0.00254
        0.98000   0.00000   0.00000   0.00000  -0.00010   0.00037   0.00203   0.00013
        1.01000   0.00000   0.00000   0.00000  -0.00000   0.00000   0.00000   0.00000
      </tableData>

    </table>
  </function>

  <function name="aero/CMx_elevator">
    <interpolate1d>
      <property>fcs/surfaces/elevator-pos-deg</property>
      <value>-24</value> <property>aero/CMx_elevator_-24</property>
      <value>-9.5</value> <property>aero/CMx_elevator_-9.5</property>
      <value>-3</value> <property>aero/CMx_elevator_-3</property>
      <value>0</value> <value>0</value>
      <value>1.5</value> <property>aero/CMx_elevator_1.5</property>
    </interpolate1d>
  </function>

  <!-- flaps -->
  <function name="aero/CMx_flaps_20">
    <table>
      <independentVar lookup="row">velocities/mach</independentVar>
      <independentVar lookup="column">aero/alpha-deg</independentVar>
      <independentVar lookup="table">aero/beta-deg</independentVar>
      <tableData breakPoint="0.00000">
                -10.00      0.00     10.00     20.00     30.00     40.00     50.00
        0.20000   0.00000   0.00000   0.00000   0.00000   0.00000   0.00000   0.00000
        0.60000  -0.00010   0.00000  -0.00000   0.00000   0.00000   0.00000   0.00000
        0.88000   0.00000   0.00000   0.00000   0.00000   0.00000  -0.00020   0.00000
        0.92000   0.00000   0.00000  -0.00031   0.00000   0.00000   0.00104  -0.00014
        0.96000   0.00000   0.00000   0.00000   0.00000   0.00000   0.00118   0.00216
        0.98000   0.00000   0.00000   0.00000   0.00000   0.00000   0.00056   0.00000
        1.01000   0.00000   0.00000   0.00000   0.00000   0.00000   0.00000   0.00000
      </tableData>

    </table>
  </function>

  <function name="aero/CMx_flaps_30">
    <table>
      <independentVar lookup="row">velocities/mach</independentVar>
      <independentVar lookup="column">aero/alpha-deg</independentVar>
      <independentVar lookup="table">aero/beta-deg</independentVar>
      <tableData breakPoint="0.00000">
                -10.00      0.00     10.00     20.00     30.00     40.00     50.00
        0.20000  -0.00014   0.00000   0.00000   0.00000   0.00000   0.00000   0.00000
        0.60000  -0.00012   0.00000   0.00000   0.00000   0.00000   0.00000   0.00000
        0.88000   0.00000   0.00000   0.00000   0.00000  -0.00000   0.00272   0.00000
        0.92000   0.00000   0.00000   0.00000   0.00000   0.00000   0.00068  -0.00014
        0.96000   0.00000   0.00000   0.00000   0.00000   0.00000   0.00107   0.00216
        0.98000   0.00000   0.00000   0.00000   0.00000  -0.00000   0.00056   0.00000
        1.01000   0.00000   0.00000   0.00000   0.00000   0.00000  -0.00012   0.00000
      </tableData>

    </table>
  </function>

  <function name="aero/CMx_flaps">
    <interpolate1d>
      <property>fcs/surfaces/flaps-pos-deg</property>
      <value>0</value> <value>0</value>
      <value>20</value> <property>aero/CMx_flaps_20</property>
      <value>30</value> <property>aero/CMx_flaps_30</property>
    </interpolate1d>
  </function>

  <!-- left-flaperon -->
  <function name="aero/CMx_left-flaperon_-51">
    <table>
      <independentVar lookup="row">velocities/mach</independentVar>
      <independentVar lookup="column">aero/alpha-deg</independentVar>
      <independentVar lookup="table">aero/beta-deg</independentVar>
      <tableData breakPoint="0.00000">
                -10.00      0.00     10.00     20.00     30.00     40.00     50.00
        0.20000   0.00253   0.03537   0.03636   0.00057   0.00177   0.00221   0.00254
        0.60000  -0.00040   0.03979   0.03721   0.00071   0.00197   0.00266   0.00273
        0.88000  -0.00123   0.05236   0.03201   0.00110   0.00207   0.00287   0.00331
        0.92000  -0.00130   0.05634   0.03039   0.00105   0.00243   0.00303   0.00319
        0.96000  -0.00158   0.05975   0.02853   0.00056   0.00246   0.00375   0.00494
        0.98000  -0.00166   0.06093   0.02822   0.00025   0.00243   0.00305   0.00241
        1.01000  -0.00049   0.07103   0.01334  -0.00352  -0.00130  -0.00287  -0.00533
      </tableData>

    </table>
  </function>

  <function name="aero/CMx_left-flaperon">
    <interpolate1d>
      <property>fcs/surfaces/left-flaperon-pos-deg</property>
      <value>-51</value> <property>aero/CMx_left-flaperon_-51</property>
      <value>0</value> <value>0</value>
    </interpolate1d>
  </function>

  <!-- right-flaperon -->
  <function name="aero/CMx_right-flaperon_-51">
    <table>
      <independentVar lookup="row">velocities/mach</independentVar>
      <independentVar lookup="column">aero/alpha-deg</independentVar>
      <independentVar lookup="table">aero/beta-deg</independentVar>
      <tableData breakPoint="0.00000">
                -10.00      0.00     10.00     20.00     30.00     40.00     50.00
        0.20000  -0.00260  -0.03541  -0.03634  -0.00056  -0.00178  -0.00222  -0.00251
        0.60000   0.00029  -0.03984  -0.03732  -0.00070  -0.00197  -0.00266  -0.00272
        0.88000   0.00121  -0.05242  -0.03198  -0.00110  -0.00210  -0.00263  -0.00328
        0.92000   0.00130  -0.05638  -0.03046  -0.00106  -0.00244  -0.00259  -0.00335
        0.96000   0.00157  -0.05970  -0.02853  -0.00058  -0.00247  -0.00171  -0.00081
        0.98000   0.00164  -0.06095  -0.02822  -0.00024  -0.00241  -0.00193  -0.00246
        1.01000   0.00053  -0.07103  -0.01334   0.00354   0.00132   0.00282   0.00526
      </tableData>

    </table>
  </function>

  <function name="aero/CMx_right-flaperon">
    <interpolate1d>
      <property>fcs/surfaces/right-flaperon-pos-deg</property>
      <value>-51</value> <property>aero/CMx_right-flaperon_-51</property>
      <value>0</value> <value>0</value>
    </interpolate1d>
  </function>

  <!-- rudder -->
  <function name="aero/CMx_rudder_-35">
    <table>
      <independentVar lookup="row">velocities/mach</independentVar>
      <independentVar lookup="column">aero/alpha-deg</independentVar>
      <independentVar lookup="table">aero/beta-deg</independentVar>
      <tableData breakPoint="-10.00000">
                -10.00      0.00     10.00     20.00     30.00     40.00     50.00
        0.20000   0.00515   0.00576   0.00682   0.00616   0.00509   0.00505   0.00508
        0.60000   0.00587   0.00640   0.00776   0.00705   0.00361   0.00583   0.00473
        0.88000   0.00853   0.00845   0.01007   0.00986   0.00939   0.00875   0.00776
        0.92000   0.00919   0.00941   0.01024   0.01110   0.00950   0.00956   0.00847
        0.96000   0.01237   0.01157   0.01350   0.01041   0.01007   0.01070   0.00910
        0.98000   0.01247   0.01273   0.01280   0.01064   0.01114   0.01163   0.01034
        1.01000   0.01577   0.01663   0.01010   0.01867   0.01767   0.01609   0.01396
      </tableData>

      <tableData breakPoint="0.00000">
                -10.00      0.00     10.00     20.00     30.00     40.00     50.00
        0.20000   0.00554   0.00559   0.00519   0.00436   0.00622   0.00461   0.00343
        0.60000   0.00653   0.00666   0.00655   0.00685   0.00773   0.00575   0.00417
        0.88000   0.00858   0.00863   0.00839   0.00810   0.00777   0.00759   0.00643
        0.92000   0.01015   0.00863   0.00918   0.00866   0.00836   0.00846   0.00710
        0.96000   0.00973   0.00983   0.00989   0.01036   0.00951   0.01050   0.01069
        0.98000   0.01050   0.01050   0.01016   0.01011   0.01014   0.01075   0.00922
        1.01000   0.01237   0.01239   0.01237   0.01233   0.01224   0.01206   0.01121
      </tableData>

      <tableData breakPoint="10.00000">
                -10.00      0.00     10.00     20.00     30.00     40.00     50.00
        0.20000   0.00502   0.00469   0.00401   0.00204   0.00437   0.00353   0.00186
        0.60000   0.00505   0.00501   0.00315   0.00254   0.00550   0.00493   0.00287
        0.88000   0.00528   0.00333   0.00108   0.00271   0.00227   0.00433   0.00495
        0.92000   0.00365  -0.00579  -0.00483   0.00167   0.00211   0.00474   0.00501
        0.96000   0.00093   0.00152   0.00129   0.00147   0.00208   0.00456   0.00565
        0.98000   0.00563   0.00457   0.00190   0.00000   0.00173   0.00456   0.00569
        1.01000   0.00755   0.00655   0.00691   0.00292   0.00362   0.00555   0.00654
      </tableData>

    </table>
  </function>

  <function name="aero/CMx_rudder_35">
    <table>
      <independentVar lookup="row">velocities/mach</independentVar>
      <independentVar lookup="column">aero/alpha-deg</independentVar>
      <independentVar lookup="table">aero/beta-deg</independentVar>
      <tableData breakPoint="-10.00000">
                -10.00      0.00     10.00     20.00     30.00     40.00     50.00
        0.20000  -0.00503  -0.00468  -0.00395  -0.00216  -0.00487  -0.00394  -0.00197
        0.60000  -0.00523  -0.00497  -0.00342  -0.00357  -0.00523  -0.00399  -0.00367
        0.88000  -0.00536  -0.00349  -0.00020  -0.00273  -0.00220  -0.00446  -0.00464
        0.92000  -0.00447   0.00644   0.00309  -0.00164  -0.00210  -0.00463  -0.00498
        0.96000  -0.00086  -0.00153  -0.00133  -0.00136  -0.00209  -0.00457  -0.00568
        0.98000  -0.00561  -0.00457  -0.00192   0.00022  -0.00176  -0.00454  -0.00583
        1.01000  -0.00759  -0.00655  -0.00714  -0.00288  -0.00362  -0.00576  -0.00651
      </tableData>

      <tableData breakPoint="0.00000">
                -10.00      0.00     10.00     20.00     30.00     40.00     50.00
        0.20000  -0.00541  -0.00555  -0.00462  -0.00612  -0.00451  -0.00455  -0.00365
        0.60000  -0.00594  -0.00700  -0.00715  -0.00560  -0.00385  -0.00524  -0.00462
        0.88000  -0.00843  -0.00815  -0.00833  -0.00812  -0.00787  -0.00738  -0.00650
        0.92000  -0.01038  -0.00877  -0.00905  -0.00866  -0.00845  -0.00802  -0.00749
        0.96000  -0.00973  -0.00985  -0.00985  -0.00986  -0.00952  -0.00847  -0.00645
        0.98000  -0.01049  -0.01050  -0.01026  -0.01009  -0.01021  -0.00983  -0.00972
        1.01000  -0.01237  -0.01239  -0.01240  -0.01230  -0.01223  -0.01195  -0.01126
      </tableData>

      <tableData breakPoint="10.00000">
                -10.00      0.00     10.00     20.00     30.00     40.00     50.00
        0.20000  -0.00524  -0.00578  -0.00665  -0.00720  -0.00588  -0.00540  -0.00516
        0.60000  -0.00520  -0.00636  -0.00684  -0.00881  -0.00528  -0.00676  -0.00566
        0.88000  -0.00853  -0.00846  -0.00982  -0.00977  -0.00935  -0.00881  -0.00766
        0.92000  -0.00925  -0.00940  -0.01012  -0.01110  -0.00952  -0.00950  -0.00846
        0.96000  -0.01261  -0.01132  -0.01321  -0.01036  -0.01011  -0.01069  -0.00909
        0.98000  -0.01251  -0.01273  -0.01293  -0.01054  -0.01110  -0.01166  -0.01049
        1.01000  -0.01582  -0.01663  -0.01034  -0.01863  -0.01766  -0.01631  -0.01394
      </tableData>

    </table>
  </function>

  <function name="aero/CMx_rudder">
    <interpolate1d>
      <property>fcs/surfaces/rudder-pos-deg</property>
      <value>-35</value> <property>aero/CMx_rudder_-35</property>
      <value>0</value> <value>0</value>
      <value>35</value> <property>aero/CMx_rudder_35</property>
    </interpolate1d>
  </function>

  <!-- slats -->
  <function name="aero/CMx_slats_27.5">
    <table>
      <independentVar lookup="row">velocities/mach</independentVar>
      <independentVar lookup="column">aero/alpha-deg</independentVar>
      <independentVar lookup="table">aero/beta-deg</independentVar>
      <tableData breakPoint="0.00000">
                -10.00      0.00     10.00     20.00     30.00     40.00     50.00
        0.20000   0.00000   0.00000   0.00000   0.00000   0.00000   0.00000   0.00000
        0.60000   0.00000  -0.00000   0.00000   0.00000   0.00000   0.00000   0.00000
        0.88000   0.00000   0.00000   0.00000   0.00000   0.00000   0.00000   0.00000
        0.92000   0.00000   0.00000   0.00000   0.00000   0.00000   0.00000   0.00000
        0.96000   0.00000   0.00000   0.00000   0.00000   0.00000   0.00054   0.00129
        0.98000   0.00000   0.00000   0.00000   0.00000   0.00000   0.00030   0.00000
        1.01000   0.00000   0.00000  -0.00000   0.00000   0.00000   0.00000   0.00000
      </tableData>

    </table>
  </function>

  <function name="aero/CMx_slats">
    <interpolate1d>
      <property>fcs/surfaces/slats-pos-deg</property>
      <value>0</value> <value>0</value>
      <value>27.5</value> <property>aero/CMx_slats_27.5</property>
    </interpolate1d>
  </function>

  <!-- CMY -->
  <!-- base -->
  <function name="aero/CMy_base">
    <table>
      <independentVar lookup="row">velocities/mach</independentVar>
      <independentVar lookup="column">aero/alpha-deg</independentVar>
      <independentVar lookup="table">aero/beta-deg</independentVar>
      <tableData breakPoint="-10.00000">
                -10.00      0.00     10.00     20.00     30.00     40.00     50.00
        0.20000   0.13519  -0.01209  -0.15476  -0.20969  -0.18219  -0.20518  -0.23717
        0.60000   0.14294  -0.01126  -0.15019  -0.22100  -0.19557  -0.20938  -0.25162
        0.88000   0.14944  -0.00915  -0.15724  -0.24111  -0.21402  -0.23957  -0.31060
        0.92000   0.15146  -0.00900  -0.15338  -0.24571  -0.22446  -0.27278  -0.32737
        0.96000   0.15478  -0.00865  -0.14507  -0.22992  -0.26656  -0.31072  -0.37004
        0.98000   0.15679  -0.00803  -0.14029  -0.23160  -0.31838  -0.36228  -0.43442
        1.01000   0.22907  -0.00155  -0.14313  -0.27718  -0.38122  -0.39128  -0.39678
      </tableData>

      <tableData breakPoint="0.00000">
                -10.00      0.00     10.00     20.00     30.00     40.00     50.00
        0.20000   0.15021  -0.00417  -0.14202  -0.22917  -0.20187  -0.19377  -0.23674
        0.60000   0.16094  -0.00281  -0.14208  -0.24186  -0.20441  -0.20049  -0.25007
        0.88000   0.17319   0.00045  -0.14676  -0.25238  -0.22447  -0.23666  -0.30308
        0.92000   0.17759   0.00152  -0.14759  -0.25807  -0.23867  -0.26056  -0.33084
        0.96000   0.18383   0.00333  -0.14686  -0.27195  -0.27472  -0.30911  -0.36142
        0.98000   0.18855   0.00496  -0.14797  -0.29091  -0.32277  -0.37236  -0.45679
        1.01000   0.20942   0.00560  -0.15972  -0.29487  -0.36880  -0.38144  -0.41013
      </tableData>

      <tableData breakPoint="10.00000">
                -10.00      0.00     10.00     20.00     30.00     40.00     50.00
        0.20000   0.13348  -0.01151  -0.15421  -0.20914  -0.18339  -0.20791  -0.24088
        0.60000   0.14107  -0.01089  -0.14945  -0.22454  -0.19740  -0.21212  -0.25277
        0.88000   0.14761  -0.00902  -0.15340  -0.24464  -0.21880  -0.24074  -0.31414
        0.92000   0.14862  -0.00891  -0.14999  -0.24899  -0.22732  -0.27497  -0.33006
        0.96000   0.15125  -0.00856  -0.14126  -0.23003  -0.26924  -0.31322  -0.37167
        0.98000   0.15225  -0.00804  -0.13485  -0.23282  -0.32370  -0.36446  -0.43558
        1.01000   0.22806  -0.00171  -0.14296  -0.27875  -0.38023  -0.39083  -0.39693
      </tableData>

    </table>
  </function>

  <!-- elevator -->
  <function name="aero/CMy_elevator_-24">
    <table>
      <independentVar lookup="row">velocities/mach</independentVar>
      <independentVar lookup="column">aero/alpha-deg</independentVar>
      <independentVar lookup="table">aero/beta-deg</independentVar>
      <tableData breakPoint="0.00000">
                -10.00      0.00     10.00     20.00     30.00     40.00     50.00
        0.20000   0.17431   0.38537   0.59299   0.73279   0.51769   0.28332   0.10275
        0.60000   0.15817   0.38523   0.59920   0.77141   0.56844   0.32418   0.11097
        0.88000   0.13956   0.38445   0.62220   0.80685   0.73478   0.46668   0.16888
        0.92000   0.13755   0.38446   0.62605   0.81056   0.78951   0.52589   0.19984
        0.96000   0.13816   0.38485   0.62824   0.81569   0.82805   0.65132   0.23856
        0.98000   0.14191   0.38567   0.62806   0.81848   0.84307   0.76185   0.32589
        1.01000   0.26012   0.40663   0.54259   0.73609   0.85576   0.89248   0.59772
      </tableData>

    </table>
  </function>

  <function name="aero/CMy_elevator_-9.5">
    <table>
      <independentVar lookup="row">velocities/mach</independentVar>
      <independentVar lookup="column">aero/alpha-deg</independentVar>
      <independentVar lookup="table">aero/beta-deg</independentVar>
      <tableData breakPoint="0.00000">
                -10.00      0.00     10.00     20.00     30.00     40.00     50.00
        0.20000   0.20300   0.29445   0.30600   0.28884   0.10183  -0.00030   0.01971
        0.60000   0.18965   0.32174   0.33848   0.31737   0.10360  -0.00342   0.01882
        0.88000   0.17521   0.37643   0.42200   0.38640   0.13823  -0.01068   0.01035
        0.92000   0.17401   0.38509   0.44801   0.41679   0.16331  -0.01252   0.00599
        0.96000   0.17575   0.39333   0.48750   0.47052   0.21257  -0.01757  -0.02285
        0.98000   0.18026   0.39694   0.51783   0.52348   0.27038  -0.01749  -0.00380
        1.01000   0.25527   0.41542   0.54104   0.64724   0.50029   0.08588  -0.05232
      </tableData>

    </table>
  </function>

  <function name="aero/CMy_elevator_-3">
    <table>
      <independentVar lookup="row">velocities/mach</independentVar>
      <independentVar lookup="column">aero/alpha-deg</independentVar>
      <independentVar lookup="table">aero/beta-deg</independentVar>
      <tableData breakPoint="0.00000">
                -10.00      0.00     10.00     20.00     30.00     40.00     50.00
        0.20000   0.08601   0.09535   0.09863   0.09167  -0.00159   0.00000   0.00699
        0.60000   0.08710   0.10546   0.10964   0.09872  -0.00233  -0.00175   0.01738
        0.88000   0.10737   0.12901   0.14243   0.11105  -0.00505  -0.00698  -0.00132
        0.92000   0.11091   0.13637   0.15330   0.11867  -0.00577  -0.00903  -0.00501
        0.96000   0.12222   0.14723   0.16861   0.14108  -0.00835  -0.01442  -0.03251
        0.98000   0.12931   0.15565   0.18418   0.16545  -0.00848  -0.01449  -0.01280
        1.01000   0.17314   0.18818   0.21144   0.22787   0.03879  -0.02035  -0.06359
      </tableData>

    </table>
  </function>

  <function name="aero/CMy_elevator_1.5">
    <table>
      <independentVar lookup="row">velocities/mach</independentVar>
      <independentVar lookup="column">aero/alpha-deg</independentVar>
      <independentVar lookup="table">aero/beta-deg</independentVar>
      <tableData breakPoint="0.00000">
                -10.00      0.00     10.00     20.00     30.00     40.00     50.00
        0.20000  -0.03615  -0.04978  -0.05209  -0.01603   0.00920   0.01240   0.00937
        0.60000  -0.04286  -0.05588  -0.07555  -0.00092   0.01184   0.01687   0.01525
        0.88000  -0.05522  -0.07080  -0.08177   0.00662   0.01820   0.02843   0.03140
        0.92000  -0.05948  -0.07569   0.02797   0.00656   0.02047   0.03024   0.03435
        0.96000  -0.06605  -0.08319  -0.09421   0.00419   0.02160   0.03169   0.01718
        0.98000  -0.07088  -0.08898  -0.09513  -0.00182   0.02154   0.03618   0.04353
        1.01000  -0.09914  -0.10676  -0.11869  -0.08268   0.01090   0.02965   0.06701
      </tableData>

    </table>
  </function>

  <function name="aero/CMy_elevator">
    <interpolate1d>
      <property>fcs/surfaces/elevator-pos-deg</property>
      <value>-24</value> <property>aero/CMy_elevator_-24</property>
      <value>-9.5</value> <property>aero/CMy_elevator_-9.5</property>
      <value>-3</value> <property>aero/CMy_elevator_-3</property>
      <value>0</value> <value>0</value>
      <value>1.5</value> <property>aero/CMy_elevator_1.5</property>
    </interpolate1d>
  </function>

  <!-- flaps -->
  <function name="aero/CMy_flaps_20">
    <table>
      <independentVar lookup="row">velocities/mach</independentVar>
      <independentVar lookup="column">aero/alpha-deg</independentVar>
      <independentVar lookup="table">aero/beta-deg</independentVar>
      <tableData breakPoint="0.00000">
                -10.00      0.00     10.00     20.00     30.00     40.00     50.00
        0.20000  -0.08897  -0.10014  -0.07390  -0.04774  -0.13803  -0.22789  -0.25099
        0.60000  -0.10225  -0.12358  -0.10051  -0.04636  -0.16582  -0.27935  -0.32134
        0.88000  -0.14902  -0.19922  -0.10592  -0.05909  -0.23264  -0.39303  -0.41533
        0.92000  -0.17484  -0.23334  -0.10888  -0.06768  -0.24761  -0.41575  -0.43821
        0.96000  -0.22651  -0.29091  -0.21961  -0.08237  -0.26834  -0.45956  -0.49580
        0.98000  -0.27597  -0.35049  -0.25540  -0.08535  -0.27816  -0.49400  -0.50050
        1.01000  -0.50113  -0.67973  -0.44185  -0.18673  -0.31907  -0.63153  -0.71892
      </tableData>

    </table>
  </function>

  <function name="aero/CMy_flaps_30">
    <table>
      <independentVar lookup="row">velocities/mach</independentVar>
      <independentVar lookup="column">aero/alpha-deg</independentVar>
      <independentVar lookup="table">aero/beta-deg</independentVar>
      <tableData breakPoint="0.00000">
                -10.00      0.00     10.00     20.00     30.00     40.00     50.00
        0.20000  -0.12342  -0.13322  -0.08918  -0.04747  -0.13591  -0.23056  -0.25406
        0.60000  -0.14438  -0.16221  -0.10917  -0.04568  -0.16208  -0.28087  -0.32539
        0.88000  -0.21807  -0.26058  -0.12572  -0.05917  -0.22924  -0.39756  -0.42787
        0.92000  -0.25584  -0.30461  -0.11242  -0.06661  -0.24651  -0.43564  -0.45321
        0.96000  -0.32822  -0.33825  -0.23137  -0.08560  -0.26694  -0.48517  -0.51558
        0.98000  -0.40125  -0.37027  -0.31737  -0.09036  -0.27811  -0.52577  -0.52343
        1.01000  -0.73533  -0.76130  -0.55312  -0.21559  -0.32527  -0.66186  -0.74450
      </tableData>

    </table>
  </function>

  <function name="aero/CMy_flaps">
    <interpolate1d>
      <property>fcs/surfaces/flaps-pos-deg</property>
      <value>0</value> <value>0</value>
      <value>20</value> <property>aero/CMy_flaps_20</property>
      <value>30</value> <property>aero/CMy_flaps_30</property>
    </interpolate1d>
  </function>

  <!-- left-flaperon -->
  <function name="aero/CMy_left-flaperon_-51">
    <table>
      <independentVar lookup="row">velocities/mach</independentVar>
      <independentVar lookup="column">aero/alpha-deg</independentVar>
      <independentVar lookup="table">aero/beta-deg</independentVar>
      <tableData breakPoint="0.00000">
                -10.00      0.00     10.00     20.00     30.00     40.00     50.00
        0.20000   0.02232   0.07112   0.07082   0.03546   0.02510   0.02063   0.01863
        0.60000   0.02540   0.08859   0.08042   0.04285   0.02848   0.02478   0.02288
        0.88000   0.04190   0.15343   0.12821   0.05365   0.04168   0.03592   0.03627
        0.92000   0.04974   0.17905   0.14907   0.05946   0.04504   0.04158   0.04040
        0.96000   0.06275   0.22361   0.19704   0.06781   0.05373   0.04942   0.02554
        0.98000   0.07881   0.26997   0.24234   0.08361   0.06428   0.06128   0.06120
        1.01000   0.13611   0.37753   0.33351   0.11773   0.03459   0.03411   0.03598
      </tableData>

    </table>
  </function>

  <function name="aero/CMy_left-flaperon">
    <interpolate1d>
      <property>fcs/surfaces/left-flaperon-pos-deg</property>
      <value>-51</value> <property>aero/CMy_left-flaperon_-51</property>
      <value>0</value> <value>0</value>
    </interpolate1d>
  </function>

  <!-- right-flaperon -->
  <function name="aero/CMy_right-flaperon_-51">
    <table>
      <independentVar lookup="row">velocities/mach</independentVar>
      <independentVar lookup="column">aero/alpha-deg</independentVar>
      <independentVar lookup="table">aero/beta-deg</independentVar>
      <tableData breakPoint="0.00000">
                -10.00      0.00     10.00     20.00     30.00     40.00     50.00
        0.20000   0.02287   0.07128   0.07187   0.03537   0.02494   0.02102   0.01868
        0.60000   0.02571   0.08931   0.07936   0.04275   0.02860   0.02492   0.02280
        0.88000   0.04179   0.15254   0.12773   0.05376   0.04192   0.03720   0.03555
        0.92000   0.04823   0.17934   0.14681   0.05936   0.04612   0.04230   0.03962
        0.96000   0.06342   0.22621   0.19587   0.06835   0.05520   0.04964   0.02503
        0.98000   0.07870   0.26951   0.24205   0.08339   0.06537   0.06149   0.06159
        1.01000   0.13390   0.37752   0.33345   0.11789   0.03561   0.03474   0.03619
      </tableData>

    </table>
  </function>

  <function name="aero/CMy_right-flaperon">
    <interpolate1d>
      <property>fcs/surfaces/right-flaperon-pos-deg</property>
      <value>-51</value> <property>aero/CMy_right-flaperon_-51</property>
      <value>0</value> <value>0</value>
    </interpolate1d>
  </function>

  <!-- rudder -->
  <function name="aero/CMy_rudder_-35">
    <table>
      <independentVar lookup="row">velocities/mach</independentVar>
      <independentVar lookup="column">aero/alpha-deg</independentVar>
      <independentVar lookup="table">aero/beta-deg</independentVar>
      <tableData breakPoint="-10.00000">
                -10.00      0.00     10.00     20.00     30.00     40.00     50.00
        0.20000  -0.00074   0.00893  -0.00090   0.01763   0.08696   0.06753   0.00529
        0.60000  -0.00495   0.00713  -0.05014   0.02282   0.09576   0.07332   0.05557
        0.88000   0.00487   0.00441  -0.00187   0.01417   0.01674   0.00947   0.00186
        0.92000   0.00017  -0.00234   0.00318   0.01142   0.02043   0.01210   0.00357
        0.96000  -0.33763  -0.29872  -0.05651   0.00305   0.02317   0.01099   0.00446
        0.98000  -0.01105  -0.02618  -0.13328   0.02169   0.02428   0.00976   0.00663
        1.01000  -0.02299   0.01435   0.04510   0.02304   0.02234   0.01613   0.01160
      </tableData>

      <tableData breakPoint="0.00000">
                -10.00      0.00     10.00     20.00     30.00     40.00     50.00
        0.20000   0.00076  -0.00038   0.01263   0.02213   0.01254   0.01183   0.00647
        0.60000  -0.00599  -0.00010   0.00117   0.01919   0.03025   0.02534   0.00834
        0.88000  -0.01548  -0.00561   0.00967   0.01251   0.01467   0.01442   0.01099
        0.92000  -0.11950  -0.00303   0.01312   0.01410   0.01800   0.01621   0.01184
        0.96000  -0.01261  -0.00311   0.00954  -0.00543   0.02115   0.01815  -0.00851
        0.98000  -0.01229  -0.00301   0.00963   0.01975   0.02426   0.02347   0.01832
        1.01000   0.00596   0.00644   0.00672   0.00753   0.00629   0.00578   0.00583
      </tableData>

      <tableData breakPoint="10.00000">
                -10.00      0.00     10.00     20.00     30.00     40.00     50.00
        0.20000  -0.03793  -0.02438  -0.03041   0.02582   0.06908   0.06669   0.02627
        0.60000  -0.11427  -0.02515  -0.05846   0.03375   0.05844   0.08249   0.02000
        0.88000  -0.04603  -0.06507  -0.05236   0.00983   0.00772   0.01300   0.00714
        0.92000  -0.13367  -0.23256  -0.07029   0.01013  -0.00152   0.01215   0.00736
        0.96000  -0.27743  -0.12640   0.08798   0.00207   0.00367   0.01515   0.01105
        0.98000  -0.03875  -0.03146  -0.03997  -0.01428   0.00477   0.01969   0.01388
        1.01000  -0.03630  -0.00198   0.03719  -0.00730  -0.00201   0.00069  -0.00019
      </tableData>

    </table>
  </function>
  <function name="aero/CMy_rudder_35">
    <table>
      <independentVar lookup="row">velocities/mach</independentVar>
      <independentVar lookup="column">aero/alpha-deg</independentVar>
      <independentVar lookup="table">aero/beta-deg</independentVar>
      <tableData breakPoint="-10.00000">
                -10.00      0.00     10.00     20.00     30.00     40.00     50.00
        0.20000  -0.03754  -0.02339  -0.02936   0.02346   0.09616   0.11585   0.03100
        0.60000  -0.04309  -0.02655  -0.07317   0.03884   0.09608   0.05251   0.09881
        0.88000  -0.04494  -0.06256  -0.07577   0.00958   0.00644   0.01335   0.00829
        0.92000  -0.09883  -0.28402  -0.06777   0.00752  -0.00266   0.01582   0.01037
        0.96000  -0.27001  -0.13543   0.08754   0.00045   0.00283   0.01523   0.01290
        0.98000  -0.04326  -0.03197  -0.03605  -0.01436  -0.00165   0.01661   0.01481
        1.01000  -0.03766  -0.00214   0.03226  -0.00853  -0.00108   0.00043  -0.00017
      </tableData>

      <tableData breakPoint="0.00000">
                -10.00      0.00     10.00     20.00     30.00     40.00     50.00
        0.20000   0.00070  -0.00092   0.04254   0.02029  -0.02206   0.00601   0.00943
        0.60000  -0.00129   0.00333   0.01377   0.01635   0.01342   0.00894   0.01124
        0.88000  -0.01100  -0.00457   0.00834   0.01246   0.01496   0.01528   0.01177
        0.92000  -0.27491  -0.00290   0.01309   0.01350   0.01764   0.01640   0.01262
        0.96000  -0.01195  -0.00315   0.01129   0.00879   0.02074   0.01781  -0.00882
        0.98000  -0.01228  -0.00326   0.01120   0.01987   0.02414   0.02316   0.01881
        1.01000   0.00594   0.00645   0.00680   0.00748   0.00635   0.00579   0.00593
      </tableData>

      <tableData breakPoint="10.00000">
                -10.00      0.00     10.00     20.00     30.00     40.00     50.00
        0.20000   0.00070   0.00898  -0.01563   0.01699   0.05806   0.03565   0.00516
        0.60000  -0.02624   0.00658  -0.06263   0.02646   0.04775   0.01114   0.00148
        0.88000   0.00583   0.00428  -0.00418   0.01561   0.02068   0.00796   0.00227
        0.92000  -0.00095  -0.00202   0.00599   0.01203   0.02291   0.01009   0.00318
        0.96000  -0.30886  -0.30840  -0.04972   0.00406   0.02525   0.01087   0.00336
        0.98000  -0.00717  -0.02591  -0.14160   0.02458   0.03041   0.01218   0.00581
        1.01000  -0.02161   0.01447   0.04990   0.02440   0.02156   0.01639   0.01165
      </tableData>

    </table>
  </function>

  <function name="aero/CMy_rudder">
    <interpolate1d>
      <property>fcs/surfaces/rudder-pos-deg</property>
      <value>-35</value> <property>aero/CMy_rudder_-35</property>
      <value>0</value> <value>0</value>
      <value>35</value> <property>aero/CMy_rudder_35</property>
    </interpolate1d>
  </function>

  <!-- slats -->
  <function name="aero/CMy_slats_27.5">
    <table>
      <independentVar lookup="row">velocities/mach</independentVar>
      <independentVar lookup="column">aero/alpha-deg</independentVar>
      <independentVar lookup="table">aero/beta-deg</independentVar>
      <tableData breakPoint="0.00000">
                -10.00      0.00     10.00     20.00     30.00     40.00     50.00
        0.20000  -0.01141  -0.01300  -0.01059  -0.01983  -0.12126  -0.16195  -0.16865
        0.60000  -0.00551  -0.01667  -0.02346  -0.01887  -0.14834  -0.16560  -0.17254
        0.88000   0.00822  -0.02724  -0.05511  -0.03951  -0.18046  -0.18067  -0.19038
        0.92000   0.00500  -0.03125  -0.06043  -0.04531  -0.18517  -0.18650  -0.19768
        0.96000  -0.00226  -0.03776  -0.06275  -0.04822  -0.19250  -0.19711  -0.22840
        0.98000  -0.00534  -0.04319  -0.06442  -0.04441  -0.19773  -0.20320  -0.21562
        1.01000  -0.00905  -0.07827  -0.10034  -0.07030  -0.24658  -0.28367  -0.32041
      </tableData>

    </table>
  </function>

  <function name="aero/CMy_slats">
    <interpolate1d>
      <property>fcs/surfaces/slats-pos-deg</property>
      <value>0</value> <value>0</value>
      <value>27.5</value> <property>aero/CMy_slats_27.5</property>
    </interpolate1d>
  </function>

  <!-- CMZ -->
  <!-- base -->
  <function name="aero/CMz_base">
    <table>
      <independentVar lookup="row">velocities/mach</independentVar>
      <independentVar lookup="column">aero/alpha-deg</independentVar>
      <independentVar lookup="table">aero/beta-deg</independentVar>
      <tableData breakPoint="-10.00000">
                -10.00      0.00     10.00     20.00     30.00     40.00     50.00
        0.20000   0.01329   0.01605   0.02052   0.02531   0.01919   0.01079   0.00750
        0.60000   0.01579   0.01788   0.02476   0.02933   0.01956   0.01160   0.00480
        0.88000   0.02028   0.02225   0.03349   0.03012   0.02436   0.01193   0.00313
        0.92000   0.02135   0.02374   0.03382   0.03628   0.02359   0.01206   0.00486
        0.96000   0.02202   0.02536   0.03596   0.04338   0.02342   0.01535   0.00504
        0.98000   0.02170   0.02622   0.03804   0.04690   0.02675   0.01626   0.00775
        1.01000   0.02010   0.02432   0.02885   0.03372   0.02532   0.00969   0.00468
      </tableData>

      <tableData breakPoint="0.00000">
                -10.00      0.00     10.00     20.00     30.00     40.00     50.00
        0.20000  -0.00019   0.00000   0.00000  -0.00018   0.00000  -0.00047  -0.00027
        0.60000   0.00000   0.00000   0.00000  -0.00010   0.00010   0.00023  -0.00066
        0.88000   0.00000   0.00000   0.00000   0.00000   0.00000   0.00135   0.00075
        0.92000   0.00000   0.00000   0.00000   0.00000   0.00000   0.00238  -0.00075
        0.96000   0.00000   0.00000   0.00000   0.00000   0.00012   0.00957   0.01180
        0.98000   0.00000   0.00000  -0.00019   0.00000  -0.00012   0.00501  -0.00021
        1.01000   0.00000   0.00000   0.00000   0.00000   0.00000   0.00024   0.00021
      </tableData>

      <tableData breakPoint="10.00000">
                -10.00      0.00     10.00     20.00     30.00     40.00     50.00
        0.20000  -0.01381  -0.01610  -0.02028  -0.02532  -0.01948  -0.01066  -0.00698
        0.60000  -0.01662  -0.01797  -0.02454  -0.02876  -0.01950  -0.01160  -0.00462
        0.88000  -0.02088  -0.02228  -0.03348  -0.02984  -0.02435  -0.01224  -0.00159
        0.92000  -0.02180  -0.02375  -0.03368  -0.03621  -0.02367  -0.01250  -0.00415
        0.96000  -0.02199  -0.02536  -0.03557  -0.04328  -0.02354  -0.01514  -0.00482
        0.98000  -0.02163  -0.02622  -0.03762  -0.04587  -0.02663  -0.01586  -0.00773
        1.01000  -0.02015  -0.02434  -0.02915  -0.03377  -0.02539  -0.00974  -0.00462
      </tableData>

    </table>
  </function>

  <!-- elevator -->
  <function name="aero/CMz_elevator_-24">
    <table>
      <independentVar lookup="row">velocities/mach</independentVar>
      <independentVar lookup="column">aero/alpha-deg</independentVar>
      <independentVar lookup="table">aero/beta-deg</independentVar>
      <tableData breakPoint="0.00000">
                -10.00      0.00     10.00     20.00     30.00     40.00     50.00
        0.20000   0.00019  -0.00113   0.00000  -0.00013  -0.00047   0.00074  -0.00060
        0.60000   0.00000   0.00037   0.00000   0.00010  -0.00053   0.00374   0.00089
        0.88000   0.00000  -0.00011  -0.00014   0.00000   0.00000  -0.00832  -0.00075
        0.92000   0.00000   0.00000  -0.00037   0.00000   0.00000  -0.00090   0.00169
        0.96000   0.00000   0.00000   0.00000   0.00000   0.00000  -0.02747  -0.01229
        0.98000   0.00000   0.00000   0.00000   0.00000   0.00012  -0.00436  -0.00391
        1.01000   0.00000   0.00000   0.00057   0.00010  -0.00023   0.00228  -0.00166
      </tableData>

    </table>
  </function>

  <function name="aero/CMz_elevator_-9.5">
    <table>
      <independentVar lookup="row">velocities/mach</independentVar>
      <independentVar lookup="column">aero/alpha-deg</independentVar>
      <independentVar lookup="table">aero/beta-deg</independentVar>
      <tableData breakPoint="0.00000">
                -10.00      0.00     10.00     20.00     30.00     40.00     50.00
        0.20000   0.00019  -0.00000  -0.00016   0.00090   0.00017   0.00047   0.00047
        0.60000   0.00000  -0.00000   0.00000   0.00065  -0.00010  -0.00045   0.00066
        0.88000   0.00000   0.00000  -0.00015  -0.00061   0.00045  -0.00171  -0.00121
        0.92000   0.00000   0.00000  -0.00048   0.00000   0.00152  -0.00256   0.00075
        0.96000  -0.00000   0.00000  -0.00039  -0.00028   0.00015  -0.00847  -0.01120
        0.98000  -0.00000   0.00000   0.00000   0.00000   0.00066  -0.00440   0.00021
        1.01000   0.00011  -0.00000   0.00000   0.00041  -0.00017  -0.00024  -0.01683
      </tableData>

    </table>
  </function>

  <function name="aero/CMz_elevator_-3">
    <table>
      <independentVar lookup="row">velocities/mach</independentVar>
      <independentVar lookup="column">aero/alpha-deg</independentVar>
      <independentVar lookup="table">aero/beta-deg</independentVar>
      <tableData breakPoint="0.00000">
                -10.00      0.00     10.00     20.00     30.00     40.00     50.00
        0.20000   0.00019   0.00000   0.00000   0.00018   0.00000   0.00089   0.00027
        0.60000  -0.00117   0.00000  -0.00033  -0.00011  -0.00034   0.00078   0.00579
        0.88000   0.00134   0.00000   0.00000   0.00000   0.00000  -0.00294  -0.00111
        0.92000   0.00028   0.00000   0.00000   0.00000   0.00000  -0.00362   0.00075
        0.96000  -0.00019   0.00000   0.00024   0.00021  -0.00024  -0.00996  -0.01168
        0.98000   0.00000   0.00000   0.00029   0.00000  -0.00029  -0.00501   0.00011
        1.01000   0.00027   0.00000   0.00000   0.00000  -0.00101   0.00145  -0.00056
      </tableData>

    </table>
  </function>

  <function name="aero/CMz_elevator_1.5">
    <table>
      <independentVar lookup="row">velocities/mach</independentVar>
      <independentVar lookup="column">aero/alpha-deg</independentVar>
      <independentVar lookup="table">aero/beta-deg</independentVar>
      <tableData breakPoint="0.00000">
                -10.00      0.00     10.00     20.00     30.00     40.00     50.00
        0.20000  -0.00448   0.00020   0.00000   0.00123  -0.00027  -0.00256   0.00010
        0.60000  -0.00021   0.00012  -0.01796   0.00033   0.00000  -0.00047  -0.00037
        0.88000  -0.00022   0.00010   0.01237  -0.00015  -0.00277  -0.00156  -0.00030
        0.92000   0.00023   0.00000  -0.01087   0.00000   0.00034   0.00383   0.00167
        0.96000  -0.00013   0.00000   0.00077   0.00029   0.00013  -0.00530  -0.01645
        0.98000  -0.00018   0.00000  -0.00091   0.00101  -0.00326  -0.01835  -0.00134
        1.01000   0.00000   0.00000   0.00000   0.00000   0.00030   0.00022   0.00000
      </tableData>

    </table>
  </function>

  <function name="aero/CMz_elevator">
    <interpolate1d>
      <property>fcs/surfaces/elevator-pos-deg</property>
      <value>-24</value> <property>aero/CMz_elevator_-24</property>
      <value>-9.5</value> <property>aero/CMz_elevator_-9.5</property>
      <value>-3</value> <property>aero/CMz_elevator_-3</property>
      <value>0</value> <value>0</value>
      <value>1.5</value> <property>aero/CMz_elevator_1.5</property>
    </interpolate1d>
  </function>

  <!-- flaps -->
  <function name="aero/CMz_flaps_20">
    <table>
      <independentVar lookup="row">velocities/mach</independentVar>
      <independentVar lookup="column">aero/alpha-deg</independentVar>
      <independentVar lookup="table">aero/beta-deg</independentVar>
      <tableData breakPoint="0.00000">
                -10.00      0.00     10.00     20.00     30.00     40.00     50.00
        0.20000   0.00019  -0.00013  -0.00017   0.00000  -0.00000   0.00000   0.00014
        0.60000   0.00000   0.00000   0.00079  -0.00019  -0.00010   0.00040   0.00019
        0.88000   0.00000   0.00000  -0.00023  -0.00010  -0.00049   0.00181   0.00000
        0.92000   0.00000   0.00010   0.00454   0.00030   0.00015  -0.00938   0.00075
        0.96000   0.00000  -0.00023   0.00000   0.00000   0.00000  -0.01048  -0.01205
        0.98000   0.00000   0.00000   0.00032   0.00000   0.00000  -0.00501   0.00021
        1.01000   0.00000   0.00000  -0.00000   0.00000   0.00000   0.00025   0.00000
      </tableData>

    </table>
  </function>

  <function name="aero/CMz_flaps_30">
    <table>
      <independentVar lookup="row">velocities/mach</independentVar>
      <independentVar lookup="column">aero/alpha-deg</independentVar>
      <independentVar lookup="table">aero/beta-deg</independentVar>
      <tableData breakPoint="0.00000">
                -10.00      0.00     10.00     20.00     30.00     40.00     50.00
        0.20000   0.00050  -0.00015   0.00000   0.00018   0.00000   0.00031   0.00015
        0.60000   0.00019  -0.00016  -0.00020  -0.00013  -0.00010   0.00048   0.00022
        0.88000   0.00000   0.00000  -0.00048   0.00014  -0.00011  -0.02377   0.00011
        0.92000   0.00000   0.00017   0.00039   0.00000   0.00023  -0.00623   0.00085
        0.96000   0.00000  -0.00018   0.00000   0.00000   0.00000  -0.00970  -0.01201
        0.98000   0.00000  -0.00013   0.00045   0.00018   0.00000  -0.00517   0.00054
        1.01000   0.00000   0.00000   0.00000   0.00000   0.00000   0.00038   0.00000
      </tableData>

    </table>
  </function>

  <function name="aero/CMz_flaps">
    <interpolate1d>
      <property>fcs/surfaces/flaps-pos-deg</property>
      <value>0</value> <value>0</value>
      <value>20</value> <property>aero/CMz_flaps_20</property>
      <value>30</value> <property>aero/CMz_flaps_30</property>
    </interpolate1d>
  </function>

  <!-- left-flaperon -->
  <function name="aero/CMz_left-flaperon_-51">
    <table>
      <independentVar lookup="row">velocities/mach</independentVar>
      <independentVar lookup="column">aero/alpha-deg</independentVar>
      <independentVar lookup="table">aero/beta-deg</independentVar>
      <tableData breakPoint="0.00000">
                -10.00      0.00     10.00     20.00     30.00     40.00     50.00
        0.20000   0.00468   0.00569   0.00689  -0.00445  -0.00755  -0.00720  -0.00571
        0.60000   0.00532   0.00683   0.00759  -0.00519  -0.00847  -0.00933  -0.00568
        0.88000   0.00660   0.01006   0.00892  -0.00737  -0.00899  -0.00899  -0.00768
        0.92000   0.00738   0.01177   0.00936  -0.00744  -0.01016  -0.01017  -0.00606
        0.96000   0.00743   0.00798   0.01285  -0.00663  -0.01069  -0.01593  -0.01557
        0.98000   0.00813   0.01205   0.01660  -0.00689  -0.01106  -0.01072  -0.00382
        1.01000   0.01531   0.03028   0.03476   0.00376  -0.00609  -0.00062   0.00278
      </tableData>

    </table>
  </function>

  <function name="aero/CMz_left-flaperon">
    <interpolate1d>
      <property>fcs/surfaces/left-flaperon-pos-deg</property>
      <value>-51</value> <property>aero/CMz_left-flaperon_-51</property>
      <value>0</value> <value>0</value>
    </interpolate1d>
  </function>

  <!-- right-flaperon -->
  <function name="aero/CMz_right-flaperon_-51">
    <table>
      <independentVar lookup="row">velocities/mach</independentVar>
      <independentVar lookup="column">aero/alpha-deg</independentVar>
      <independentVar lookup="table">aero/beta-deg</independentVar>
      <tableData breakPoint="0.00000">
                -10.00      0.00     10.00     20.00     30.00     40.00     50.00
        0.20000  -0.00452  -0.00556  -0.00657   0.00487   0.00760   0.00803   0.00603
        0.60000  -0.00526  -0.00667  -0.00662   0.00524   0.00807   0.00902   0.00656
        0.88000  -0.00663  -0.01017  -0.00891   0.00738   0.00914   0.00692   0.00699
        0.92000  -0.00741  -0.01148  -0.00913   0.00751   0.01020   0.00593   0.00677
        0.96000  -0.00742  -0.00822  -0.01295   0.00664   0.01058  -0.00213  -0.00688
        0.98000  -0.00827  -0.01195  -0.01616   0.00685   0.01102   0.00068   0.00489
        1.01000  -0.01502  -0.03025  -0.03479  -0.00379   0.00599   0.00069  -0.00271
      </tableData>

    </table>
  </function>

  <function name="aero/CMz_right-flaperon">
    <interpolate1d>
      <property>fcs/surfaces/right-flaperon-pos-deg</property>
      <value>-51</value> <property>aero/CMz_right-flaperon_-51</property>
      <value>0</value> <value>0</value>
    </interpolate1d>
  </function>

  <!-- rudder -->
  <function name="aero/CMz_rudder_-35">
    <table>
      <independentVar lookup="row">velocities/mach</independentVar>
      <independentVar lookup="column">aero/alpha-deg</independentVar>
      <independentVar lookup="table">aero/beta-deg</independentVar>
      <tableData breakPoint="-10.00000">
                -10.00      0.00     10.00     20.00     30.00     40.00     50.00
        0.20000  -0.03784  -0.04361  -0.04726  -0.02689  -0.01364  -0.02763  -0.03849
        0.60000  -0.04252  -0.04769  -0.05369  -0.04602  -0.00083  -0.03409  -0.02561
        0.88000  -0.05929  -0.06049  -0.08424  -0.07443  -0.06786  -0.06047  -0.05323
        0.92000  -0.06401  -0.06846  -0.08275  -0.08168  -0.07044  -0.06387  -0.05721
        0.96000  -0.11469  -0.07883  -0.10200  -0.08790  -0.07437  -0.07013  -0.05967
        0.98000  -0.08787  -0.10143  -0.12685  -0.09028  -0.07869  -0.07509  -0.06587
        1.01000  -0.10524  -0.10864  -0.11590  -0.11493  -0.10795  -0.09856  -0.08742
      </tableData>

      <tableData breakPoint="0.00000">
                -10.00      0.00     10.00     20.00     30.00     40.00     50.00
        0.20000  -0.04067  -0.04215  -0.03478  -0.02345  -0.04807  -0.02852  -0.02052
        0.60000  -0.04705  -0.04940  -0.04413  -0.05215  -0.05892  -0.03853  -0.02430
        0.88000  -0.05810  -0.05999  -0.05655  -0.05348  -0.05005  -0.04787  -0.03951
        0.92000  -0.07019  -0.05790  -0.06133  -0.05689  -0.05313  -0.05314  -0.04333
        0.96000  -0.06390  -0.06488  -0.06529  -0.07427  -0.06082  -0.06782  -0.06427
        0.98000  -0.06829  -0.06868  -0.06776  -0.06616  -0.06477  -0.06824  -0.05611
        1.01000  -0.07954  -0.07991  -0.07981  -0.07932  -0.07813  -0.07651  -0.07162
      </tableData>

      <tableData breakPoint="10.00000">
                -10.00      0.00     10.00     20.00     30.00     40.00     50.00
        0.20000  -0.03729  -0.03591  -0.03015  -0.01621  -0.03665  -0.02446  -0.00441
        0.60000  -0.03322  -0.03692  -0.01159  -0.01349  -0.04181  -0.04108  -0.01283
        0.88000  -0.03445  -0.01265   0.02279  -0.00962  -0.01203  -0.02232  -0.02710
        0.92000  -0.01120   0.05114   0.07766  -0.00155  -0.01280  -0.02751  -0.02788
        0.96000   0.04746   0.04195   0.03741   0.01050  -0.01663  -0.02998  -0.03414
        0.98000  -0.03233  -0.01899   0.03224   0.02375  -0.01320  -0.03226  -0.03569
        1.01000  -0.04876  -0.04537   0.03759  -0.02718  -0.03434  -0.04255  -0.04629
      </tableData>

    </table>
  </function>

  <function name="aero/CMz_rudder_35">
    <table>
      <independentVar lookup="row">velocities/mach</independentVar>
      <independentVar lookup="column">aero/alpha-deg</independentVar>
      <independentVar lookup="table">aero/beta-deg</independentVar>
      <tableData breakPoint="-10.00000">
                -10.00      0.00     10.00     20.00     30.00     40.00     50.00
        0.20000   0.03777   0.03600   0.03113   0.02124   0.03786   0.02940   0.00583
        0.60000   0.03768   0.03645   0.03100   0.02497   0.03796   0.02085   0.02874
        0.88000   0.03599   0.01476  -0.03171   0.01030   0.01130   0.02388   0.02392
        0.92000   0.02285  -0.05156  -0.07346   0.00166   0.01280   0.02698   0.02774
        0.96000  -0.04643  -0.04238  -0.04088  -0.01143   0.01668   0.03024   0.03439
        0.98000   0.03204   0.01907  -0.03492  -0.02487   0.01325   0.03197   0.03744
        1.01000   0.04900   0.04543  -0.03718   0.02717   0.03444   0.04408   0.04620
      </tableData>

      <tableData breakPoint="0.00000">
                -10.00      0.00     10.00     20.00     30.00     40.00     50.00
        0.20000   0.04169   0.04174   0.02844   0.04434   0.02405   0.02815   0.02455
        0.60000   0.04259   0.05359   0.05062   0.02546   0.00933   0.03109   0.03280
        0.88000   0.05708   0.05541   0.05630   0.05368   0.05099   0.04540   0.03853
        0.92000   0.07405   0.05874   0.06088   0.05716   0.05429   0.04899   0.04648
        0.96000   0.06392   0.06501   0.06535   0.06725   0.06078   0.04999   0.04186
        0.98000   0.06818   0.06877   0.06908   0.06587   0.06606   0.06044   0.06157
        1.01000   0.07954   0.07992   0.08006   0.07910   0.07811   0.07537   0.07198
      </tableData>

      <tableData breakPoint="10.00000">
                -10.00      0.00     10.00     20.00     30.00     40.00     50.00
        0.20000   0.03866   0.04378   0.04138   0.03511   0.01692   0.03125   0.04029
        0.60000   0.03760   0.04762   0.03332   0.04690   0.01500   0.04791   0.04220
        0.88000   0.05985   0.06061   0.08137   0.07408   0.06782   0.06187   0.05213
        0.92000   0.06552   0.06842   0.08157   0.08180   0.07063   0.06368   0.05700
        0.96000   0.11480   0.07816   0.10221   0.08789   0.07454   0.07021   0.05963
        0.98000   0.08828   0.10140   0.12599   0.08905   0.07828   0.07568   0.06778
        1.01000   0.10549   0.10871   0.11636   0.11491   0.10795   0.10004   0.08739
      </tableData>

    </table>
  </function>

  <function name="aero/CMz_rudder">
    <interpolate1d>
      <property>fcs/surfaces/rudder-pos-deg</property>
      <value>-35</value> <property>aero/CMz_rudder_-35</property>
      <value>0</value> <value>0</value>
      <value>35</value> <property>aero/CMz_rudder_35</property>
    </interpolate1d>
  </function>

  <!-- slats -->
  <function name="aero/CMz_slats_27.5">
    <table>
      <independentVar lookup="row">velocities/mach</independentVar>
      <independentVar lookup="column">aero/alpha-deg</independentVar>
      <independentVar lookup="table">aero/beta-deg</independentVar>
      <tableData breakPoint="0.00000">
                -10.00      0.00     10.00     20.00     30.00     40.00     50.00
        0.20000   0.00000   0.00000   0.00000   0.00000   0.00000   0.00000   0.00000
        0.60000   0.00000   0.00000   0.00000   0.00010   0.00000   0.00000   0.00000
        0.88000   0.00000   0.00000   0.00000   0.00000   0.00000   0.00000   0.00000
        0.92000   0.00000   0.00000   0.00000   0.00000   0.00014  -0.00017   0.00000
        0.96000   0.00021   0.00000   0.00000   0.00000   0.00000  -0.00462  -0.00693
        0.98000   0.00000   0.00000   0.00000   0.00000   0.00000  -0.00263   0.00000
        1.01000   0.00000   0.00000   0.00000   0.00000   0.00000   0.00000   0.00000
      </tableData>

    </table>
  </function>

  <function name="aero/CMz_slats">
    <interpolate1d>
      <property>fcs/surfaces/slats-pos-deg</property>
      <value>0</value> <value>0</value>
      <value>27.5</value> <property>aero/CMz_slats_27.5</property>
    </interpolate1d>
  </function>

  <function name="aero/s/cmlp">
    <description>Roll damping derivative</description>
    <product>
      <property>aero/pb</property>
      <table>
        <independentVar lookup="row">velocities/mach</independentVar>
        <independentVar lookup="column">aero/alpha-deg</independentVar>
        <independentVar lookup="table">aero/beta-deg</independentVar>
        <tableData breakPoint="-10.0">
                   -10.0         0.001        10.0        20.0        30.0        40.0        50.0
            0.2      0.2419806   0.4232465   0.3779081   0.0544885   0.0695376   0.1001912   0.1366314
            0.6      0.2289293   0.4574691   0.2766406   0.0502393   0.0719258   0.0918446   0.1339460
            0.88     0.1728676   0.5348643   0.0509669   0.0554710   0.0728365   0.0952019   0.1180287
            0.92     0.1183173   0.5580583   0.0234640   0.0578231   0.0683783   0.1000021   0.1206633
            0.96     0.0856814   0.5850338  -0.0182980   0.0538251   0.0700031   0.0954347   0.1158137
            0.98     0.0829412   0.6253269   0.0351897   0.0179283   0.0741390   0.0965399   0.1107898
            1.01     0.0446725   0.6471677   0.0429737   0.1118770   0.1512260   0.2029836   0.2790472
        </tableData>
        <tableData breakPoint="0.0">
                   -10.0         0.001        10.0        20.0        30.0        40.0        50.0
            0.2      0.3049837   0.4207728   0.3199889   0.0550133   0.0812402   0.0997515   0.1398258
            0.6      0.2188562   0.4505431   0.2790782   0.0169132   0.0846596   0.1046073   0.1404190
            0.88     0.0557630   0.5310908   0.0327857   0.0474449   0.0765782   0.0971605   0.1247618
            0.92     0.0429777   0.5599220   0.0489167   0.0495422   0.0763083   0.0926296   0.1211660
            0.96     0.0388280   0.5921678   0.0423784   0.0583103   0.0851834   0.0929005   0.1135327
            0.98     0.0438407   0.6238459   0.0431521   0.0766895   0.0763747   0.0956634   0.1155067
            1.01     0.0486695   0.6612698   0.0515582   0.1080486   0.1563988   0.2094643   0.2925898
        </tableData>
        <tableData breakPoint="10.0">
                   -10.0         0.001        10.0        20.0        30.0        40.0        50.0
            0.2      0.3682985   0.4231651   0.2584577   0.0516216   0.0708381   0.0997876   0.1375921
            0.6      0.2653243   0.4579778   0.2320966   0.0567498   0.0741983   0.1172838   0.1353588
            0.88     0.0457108   0.5338362   0.1481924   0.0578965   0.0731717   0.0943513   0.1225933
            0.92     0.0342600   0.5614697   0.0885621   0.0635913   0.0669812   0.1039736   0.1219195
            0.96     0.0433265   0.5817831   0.1687462   0.0704112   0.0669613   0.0990902   0.1195933
            0.98     0.0417898   0.6206839   0.0704161   0.0870530   0.0721726   0.1052907   0.1219833
            1.01     0.0446736   0.6477460   0.0493241   0.0868113   0.1502207   0.2036541   0.2779886
        </tableData>
      </table>
    </product>
  </function>

  <function name="aero/s/cmlr">
    <description>Roll moment due to yaw rate</description>
    <product>
      <property>aero/rb</property>
      <table>
        <independentVar lookup="row">velocities/mach</independentVar>
        <independentVar lookup="column">aero/alpha-deg</independentVar>
        <independentVar lookup="table">aero/beta-deg</independentVar>
        <tableData breakPoint="-10.0">
                   -10.0         0.001        10.0        20.0        30.0        40.0        50.0
            0.2      0.1167621  -0.0223580  -0.1386156  -0.2509900  -0.2305424  -0.2044710  -0.1701976
            0.6      0.1806292  -0.0253139  -0.2222720  -0.2620098  -0.2206410  -0.2249971  -0.1714753
            0.88     0.2315364  -0.0285761  -0.3067990  -0.2722733  -0.2331499  -0.2097552  -0.1385906
            0.92     0.2409984  -0.0401147  -0.3425672  -0.3097356  -0.2270815  -0.2475235  -0.2061906
            0.96     0.2890977   0.1473649  -0.4938084  -0.3175143  -0.2371587  -0.2512153  -0.2305929
            0.98     0.4833374   0.0206278  -0.3737726  -0.3949697  -0.2789896  -0.2947488  -0.2777012
            1.01     0.1771715  -0.0439166  -0.1927660  -0.2383234  -0.2827050  -0.2946750  -0.2958026
        </tableData>
        <tableData breakPoint="0.0">
                   -10.0         0.001        10.0        20.0        30.0        40.0        50.0
            0.2      0.0960434  -0.0252411  -0.1300925  -0.2574100  -0.2697410  -0.2244846  -0.1686850
            0.6      0.1727901  -0.0292447  -0.2008915  -0.2716500  -0.2882494  -0.2295368  -0.1811957
            0.88     0.1962145  -0.0203948  -0.2753215  -0.2708490  -0.2563980  -0.2251094  -0.1897847
            0.92     0.1910194  -0.0152297  -0.2854149  -0.2763585  -0.2623358  -0.2345758  -0.2010999
            0.96     0.2444129  -0.0039910  -0.3166305  -0.2546131  -0.2743308  -0.2478949  -0.2189726
            0.98     0.3102787  -0.0082883  -0.4234921  -0.2796347  -0.2928641  -0.2619593  -0.2410304
            1.01     0.1812950  -0.0473098  -0.2886042  -0.2961036  -0.3089219  -0.3111026  -0.3075326
        </tableData>
        <tableData breakPoint="10.0">
                   -10.0         0.001        10.0        20.0        30.0        40.0        50.0
            0.2      0.1216322  -0.0218877  -0.1609788  -0.2551728  -0.2191051  -0.2057147  -0.1627765
            0.6      0.1835861  -0.0238885  -0.2424613  -0.2674612  -0.2250143  -0.2276958  -0.1757714
            0.88     0.1992153  -0.0309133  -0.2716488  -0.2688319  -0.2486516  -0.2241933  -0.1743330
            0.92     0.2034857  -0.0132346  -0.2600458  -0.2772556  -0.2426504  -0.2400078  -0.2031795
            0.96     0.2662354  -0.0477813  -0.1160459  -0.2892410  -0.2418194  -0.2505226  -0.2105406
            0.98     0.2433349  -0.0643013  -0.3262426  -0.2399130  -0.2852418  -0.2709271  -0.2405972
            1.01     0.1766526  -0.0478735  -0.2880197  -0.3066163  -0.3023520  -0.3014691  -0.2986952
        </tableData>
      </table>
    </product>
  </function>

  <function name="aero/s/cmmq">
    <description>Pitch damping derivative</description>
    <product>
      <property>aero/qb</property>
      <table>
        <independentVar lookup="row">velocities/mach</independentVar>
        <independentVar lookup="column">aero/alpha-deg</independentVar>
        <independentVar lookup="table">aero/beta-deg</independentVar>
        <tableData breakPoint="-10.0">
                   -10.0         0.001        10.0        20.0        30.0        40.0        50.0
            0.2     -10.6580144  -10.7870423  -9.0116075   3.6391795  -1.6633672  -1.9217559  -2.7016680
            0.6     -11.6829229  -12.0215527  -9.9762437  -2.4459259  -1.3203895  -2.1717686  -2.8677000
            0.88    -14.6785339  -15.0304235  -15.1405737  -1.7757822  -1.3509054  -1.4898277  -2.2941742
            0.92    -15.0855373  -16.0267351  -15.0207606  -1.9740174  -1.1572158  -0.7517379  -0.4682852
            0.96    -17.9077966  -17.5771385  -14.4280737  -1.9371961   6.7504513   18.0005258   21.8022349
            0.98    -22.5458815  -19.0171486  -14.4311925   3.0645654   7.6649706   8.0135798   2.2581604
            1.01    -22.0869222  -24.3379856  -20.3008803  -9.5528184  -2.0927506  -1.8166198  -1.0716747
        </tableData>
      </table>
    </product>
  </function>

  <function name="aero/s/cmma">
    <description>Pitch moment alpha dot</description>
    <product>
      <property>aero/alphadot-rad_sec</property>
      <table>
        <independentVar lookup="row">velocities/mach</independentVar>
        <independentVar lookup="column">aero/alpha-deg</independentVar>
        <independentVar lookup="table">aero/beta-deg</independentVar>
        <tableData breakPoint="-10.0">
                   -10.0         0.001        10.0        20.0        30.0        40.0        50.0
            0.2     -1.0205348  -0.8877088  -0.0082635  -0.5367799  -0.4310412  -0.3458569  -0.3779460
            0.6     -0.8273627  -0.9318883  -0.0831141  -1.8697130   0.3045179  -0.7134865   0.0737861
            0.88    -0.7892155  -1.1563676  -0.5947905   0.0833025   0.0099980  -0.2809107  -0.6260390
            0.92    -1.6475803  -1.0961426  -1.3804574  -0.0443028  -0.0404680  -0.3392891  -0.6135152
            0.96    -0.9152553  -1.1649082  -0.4582710  -0.3552542  -0.2775066  -0.3549908  -0.7266719
            0.98    -1.0468575  -1.2343866  -0.4763651  -0.4452555  -0.2457554  -0.3596131  -0.6423850
            1.01    -0.8698276  -1.7542772  -0.4806433  -1.1713771  -0.0305774  -0.2042832  -0.2812515
        </tableData>
      </table>
    </product>
  </function>

  <function name="aero/s/cmnp">
    <description>Yaw moment due to roll rate</description>
    <product>
      <property>aero/pb</property>
      <table>
        <independentVar lookup="row">velocities/mach</independentVar>
        <independentVar lookup="column">aero/alpha-deg</independentVar>
        <independentVar lookup="table">aero/beta-deg</independentVar>
        <tableData breakPoint="-10.0">
                   -10.0         0.001        10.0        20.0        30.0        40.0        50.0
            0.2      0.1499930   0.2067538   0.1490334   0.0730024   0.0298750   0.0317286  -0.0518788
            0.6      0.1358455   0.2180887   0.0405085   0.1363988  -0.1185262   0.1655932   0.1486357
            0.88     0.2085131   0.2597326   0.4241634   0.1807436   0.0569623   0.0114717  -0.0594631
            0.92     0.1808296   0.6232209   0.6732160   0.2673469   0.0387675   0.0650969   0.1208425
            0.96     0.3916780   0.5997587   1.0973931   0.3018730   0.0228277   0.1870136   0.2109770
            0.98    -0.1910102   0.0525058   0.1288328   0.5332872   0.4941327   0.7566850   0.7578705
            1.01     0.2117123   0.0447648   0.1789417   0.1763827   0.3360825   0.2544586   0.2190880
        </tableData>
        <tableData breakPoint="0.0">
                   -10.0         0.001        10.0        20.0        30.0        40.0        50.0
            0.2      0.2031301   0.2025961   0.0767236   0.1431936   0.4930317   0.2117838  -0.0064861
            0.6      0.2284482   0.2382514  -0.1008907   0.3685841   0.6212694   0.2498907   0.1891070
            0.88     0.2466523   0.0178365   0.1604695   0.1468514   0.1224921   0.0234243   0.0096021
            0.92     0.2996451   0.0792908   0.2034018   0.1487795   0.1499538   0.0449827   0.0210972
            0.96     0.1692654   0.2576383   0.1981972  -0.4680068   0.1934934   0.0862282   0.1083758
            0.98     0.2323439   0.2976541   0.2690789  -0.2320605   0.2716582   0.0944600   0.1490479
            1.01     0.2899733   0.3113198   0.2956347   0.3351643   0.3106860   0.2686366   0.2096236
        </tableData>
        <tableData breakPoint="10.0">
                   -10.0         0.001        10.0        20.0        30.0        40.0        50.0
            0.2      0.1494669   0.1873404   0.0740346   0.1134680  -0.0356413   0.0033642  -0.0960050
            0.6      0.1141907   0.2025952  -0.0502710   0.2000418   0.0051981   0.2444678   0.0062291
            0.88     0.2063585   0.2072534   0.1589995   0.1525716   0.0927489   0.0644970   0.0066530
            0.92     0.1533755  -0.1811594   8.78e-050   0.1816061   0.0817912   0.0864593   0.0841738
            0.96    -0.6560050  -0.6194394  -0.8426690   0.5310441   0.0338493   0.1389970   0.1002581
            0.98     0.1986894   0.0136122  -0.3002237   0.0085973   0.1748122   0.1764552   0.1853691
            1.01     0.2804458   0.2677979  -0.3602938   0.4416309   0.3315585   0.2602563   0.2292673
        </tableData>
      </table>
    </product>
  </function>

  <function name="aero/s/cmnr">
    <description>Yaw damping derivative</description>
    <product>
      <property>aero/rb</property>
      <table>
        <independentVar lookup="row">velocities/mach</independentVar>
        <independentVar lookup="column">aero/alpha-deg</independentVar>
        <independentVar lookup="table">aero/beta-deg</independentVar>
        <tableData breakPoint="-10.0">
                   -10.0         0.001        10.0        20.0        30.0        40.0        50.0
            0.2     -0.1032644   0.0057260   0.1081977   0.0905278   0.1011811   0.1046692   0.0890537
            0.6     -0.1277385   0.0026128   0.0964042   0.1263062   0.0833473   0.2005533   0.1538022
            0.88    -0.1219988  -0.0298060   0.1233060   0.0799816   0.1069618   0.0963642   0.1661955
            0.92    -0.1190218  -0.0290047   0.2709929   0.0797540   0.1067866   0.1155413   0.0863287
            0.96    -0.3061493  -0.0109364   0.2345232   0.1073831   0.1028852   0.0895679   0.0871928
            0.98    -0.1207822  -0.0525004   0.0969789   0.2758428   0.1102126   0.1128144   0.1369967
            1.01     0.0038785   0.0253755   0.0241882  -0.1050808  -0.0725462  -0.0379878  -0.0444518
        </tableData>
        <tableData breakPoint="0.0">
                   -10.0         0.001        10.0        20.0        30.0        40.0        50.0
            0.2     -0.1228531   0.1262922  -0.0178718   0.0880806   0.0085898   0.0967596   0.1058107
            0.6     -0.1026628   0.1748765  -0.4704901   0.5278091  -0.0137685   0.0278806   0.0905375
            0.88    -0.0941089   0.0981725   0.2355520   0.1541573   0.0821325   0.1146943   0.1253470
            0.92    -0.0894348   0.0224360   0.0112117   0.1253889   0.0956980   0.1226270   0.1152127
            0.96    -0.0908980   0.0129316   0.0164200   0.1157497   0.0257910   0.1180196   0.1481200
            0.98    -0.1173647   0.0145780   0.0813807   0.0768563   0.0982213   0.1225224   0.1506280
            1.01     0.0200164   0.0203833  -0.0481942  -0.0696096  -0.1111834  -0.0386228  -0.0449406
        </tableData>
        <tableData breakPoint="10.0">
                   -10.0         0.001        10.0        20.0        30.0        40.0        50.0
            0.2     -0.1341923   0.0137246   0.1347061   0.0956633   0.1020555   0.1030437   0.0808465
            0.6     -0.1398181   0.0133311   0.1013991   0.0394450   0.0594504  -0.1710566   0.0990805
            0.88    -0.1091554  -0.0163281   0.0584664   0.0873750   0.0890369   0.0996521   0.1222862
            0.92    -0.0956813  -0.1099592   0.1017861   0.0822518   0.1093380   0.0884003   0.0824078
            0.96    -0.3591351   0.0090763  -0.5524135   0.0740313   0.1307477   0.0912043   0.0805311
            0.98    -0.1293902  -0.0576345   0.0684930   0.0870705   0.1177503   0.1084660   0.1030073
            1.01     0.0069187   0.0325720   0.0060992   0.0211643  -0.0756682  -0.0433309  -0.0399124
        </tableData>
      </table>
    </product>
  </function>

  <function name="aero/s/cfyp">
    <description>Side force due to roll rate</description>
    <product>
      <property>aero/pb</property>
      <table>
        <independentVar lookup="row">velocities/mach</independentVar>
        <independentVar lookup="column">aero/alpha-deg</independentVar>
        <independentVar lookup="table">aero/beta-deg</independentVar>
        <tableData breakPoint="-10.0">
                   -10.0         0.001        10.0        20.0        30.0        40.0        50.0
            0.2      0.0578279   0.0490978  -0.0333574  -0.0404855  -0.0294922  -0.0229350  -0.1041173
            0.6      0.0157032   0.0685311  -0.0148532   0.0201747  -0.0613280   0.1821606   0.1288873
            0.88     0.0185549   0.0097787  -0.0015117  -0.0573844   0.0211520  -0.0172838   0.1726014
            0.92     0.0032395  -0.0132317   0.2656701  -0.0554922  -0.0080624   0.0302957  -0.0946653
            0.96    -0.3950154   0.0133741   0.3123370   0.0023355   0.0080073  -0.0433143  -0.0634017
            0.98    -0.0188747  -0.0503607   0.0021282   0.3227671   0.0591168   0.0734609   0.0998536
            1.01     0.0123364   0.0673895  -0.0076229  -0.1756950  -0.0973143  -0.0752759  -0.1153773
        </tableData>
        <tableData breakPoint="0.0">
                   -10.0         0.001        10.0        20.0        30.0        40.0        50.0
            0.2      0.0332348   0.2479179  -0.2871610  -0.0362491  -0.1783046  -0.0264160  -0.0303720
            0.6      0.0696472   0.3306406  -1.1666281   0.7799993  -0.1988913  -0.1791376  -0.0572221
            0.88     0.0278287   0.2042306   0.2199537   0.1040794  -0.0376087   0.0028995   0.0197703
            0.92     0.0461282   0.0657064  -0.2735574   0.0489014  -0.0003962   0.0120519  -0.0015548
            0.96     0.0395721   0.0510971  -0.1953310   0.0208854  -0.1839465   0.0013825   0.0499502
            0.98    -0.0217016   0.0666410  -0.0566008  -0.0503376   0.0117920   0.0095228  -0.0323614
            1.01     0.0193533   0.0857899  -0.1408409  -0.0995319  -0.1130294  -0.0750451  -0.1121890
        </tableData>
        <tableData breakPoint="10.0">
                   -10.0         0.001        10.0        20.0        30.0        40.0        50.0
            0.2      0.0343270   0.0571344   0.0205874  -0.0249392  -0.0206213  -0.0322101  -0.0885976
            0.6      0.0038630   0.0635279  -0.0266977  -0.1080302  -0.1090880  -0.6613570  -0.0119102
            0.88    -0.0007874   0.0223963  -0.1276116  -0.0400957  -0.0436750  -0.0087040   0.0383218
            0.92     0.0034673  -0.1172019  -0.0188437  -0.0539901   0.0061781  -0.0330311  -0.0956145
            0.96    -0.3891430   0.0441691  -1.5948014  -0.0716465   0.0501821  -0.0301299  -0.0674982
            0.98    -0.0442533  -0.0749476  -0.0280893  -0.0098474   0.0224201   0.0943657   0.0412678
            1.01     0.0163495   0.0772917  -0.0093392   0.0615782  -0.0901677  -0.0732748  -0.1033075
        </tableData>
      </table>
    </product>
  </function>

  <function name="aero/s/cfyr">
    <description>Side force due to yaw rate</description>
    <product>
      <property>aero/rb</property>
      <table>
        <independentVar lookup="row">velocities/mach</independentVar>
        <independentVar lookup="column">aero/alpha-deg</independentVar>
        <independentVar lookup="table">aero/beta-deg</independentVar>
        <tableData breakPoint="-10.0">
                   -10.0         0.001        10.0        20.0        30.0        40.0        50.0
            0.2      0.3324902   0.3842436   0.3635270   0.2278893   0.1590652   0.1985006  -0.1166004
            0.6      0.3417664   0.4165117   0.2411339   0.3641193  -0.0788149   0.4302560   0.5677201
            0.88     0.5194641   0.4931646   0.7208395   0.4615487   0.2443627   0.0795163  -0.2439113
            0.92     0.4746030   1.0121895   1.1015971   0.4864140   0.1438045   0.1123983   0.3902353
            0.96     1.0127834   1.2991659   2.4230802   0.5225668  -0.0227116   0.3626522   0.4502274
            0.98    -1.1280391  -0.2467320   0.6212265   0.8615352   0.2908563   1.1006023   1.3101397
            1.01     0.3124770  -0.0333974   0.4063407   0.2369884   0.2798408   0.3189563   0.2257140
        </tableData>
        <tableData breakPoint="0.0">
                   -10.0         0.001        10.0        20.0        30.0        40.0        50.0
            0.2      0.4289579   0.3801203   0.0419806   0.2689915   0.9322795   0.4827563   0.1294654
            0.6      0.5127743   0.4451533  -0.2985949   0.7238404   1.2438864   0.5238536   0.4703675
            0.88     0.5654972   0.1000365   0.2022814   0.2531147   0.2308517   0.1183416   0.1652244
            0.92     0.6947880   0.1202486   0.3198431   0.2702128   0.2869435   0.1372691   0.1719027
            0.96     0.3913525   0.4802217   0.3440623  -0.8110788   0.3668575   0.2545811   0.3883868
            0.98     0.5428560   0.5533992   0.5029487  -0.5001626   0.5478307   0.2290545   0.4527156
            1.01     0.4902907   0.4908429   0.4119589   0.4481244   0.4145378   0.3502202   0.2386111
        </tableData>
        <tableData breakPoint="10.0">
                   -10.0         0.001        10.0        20.0        30.0        40.0        50.0
            0.2      0.3620481   0.3420261   0.2739766   0.3131598   0.0311717   0.1494058  -0.1170216
            0.6      0.3390967   0.3673031   0.4875323   0.4782046   0.1226239   0.6247712   0.0727664
            0.88     0.4782898   0.3931229   0.4206704   0.3234224   0.2202396   0.1829439   0.0511754
            0.92     0.4062246  -0.0607050   0.2504570   0.2811062   0.1841788   0.1699348   0.2878213
            0.96    -1.0598221  -1.1367837  -1.6150745   0.9161674  -0.0588333   0.2784943   0.2709659
            0.98     0.1424476  -0.3454585  -0.6751173   0.0036065   0.0863070   0.2025140   0.3651027
            1.01     0.4549766   0.3917457  -0.7531185   0.8080498   0.3919769   0.3411761   0.2497864
        </tableData>
      </table>
    </product>
  </function>

    <function name="aero/force/CL">
	<sum>
	    <property>aero/CL_base</property>
	    <property>aero/CL_elevator</property>
	    <property>aero/CL_right-flaperon</property>
	    <property>aero/CL_left-flaperon</property>
	    <property>aero/CL_slats</property>
	    <property>aero/CL_flaps</property>
	</sum>
    </function>

    <axis name="LIFT">

	<function name="aero/force/Lift_combined">
	    <description>Lift due to alpha</description>
	    <product>
		<property>aero/qbar-psf</property>
		<property>metrics/Sw-sqft</property>
		<product>
		    <property>aero/force/CL</property>
		    <difference>
			<value>1</value>
			<product>
			    <property>fcs/wing-fold/wing-fold-pos</property>
			    <value>0.9</value>
			</product>
		    </difference>
		</product>
	    </product>
	</function>

	<function name="aero/force/Lift_pitch_rate">
	    <description>Lift due to pitch rate</description>
	    <product>
		<property>aero/qbar-psf</property>
		<property>metrics/Sw-sqft</property>
		<property>velocities/q-aero-rad_sec</property>
		<property>aero/ci2vel</property>
		<value> 4.2695 </value>
	    </product>
	</function>

	<function name="aero/force/Lift_alpha_rate">
	    <description>Lift due to alpha rate</description>
	    <product>
		<property>aero/qbar-psf</property>
		<property>metrics/Sw-sqft</property>
		<property>aero/alphadot-rad_sec</property>
		<property>aero/ci2vel</property>
		<value> 2.3362 </value>
	    </product>
	</function>

    </axis>

    <function name="aero/force/CDtot">
	<sum>
	    <property>aero/CDtot_base</property>
	    <property>aero/CDtot_elevator</property>
	    <property>aero/CDtot_right-flaperon</property>
	    <property>aero/CDtot_left-flaperon</property>
	    <property>aero/CDtot_slats</property>
	    <property>aero/CDtot_flaps</property>
	</sum>
    </function>

    <axis name="DRAG">

	<function name="aero/force/Drag_combined">
	    <description>Drag at zero lift</description>
	    <product>
		<property>aero/qbar-psf</property>
		<property>metrics/Sw-sqft</property>
		<property>aero/force/CDtot</property>
	    </product>
	</function>

	<function name="aero/force/CD_stores">
	    <product>
		<property>aero/qbar-psf</property>
		<sum>
		    <product>
			<property>aero/cd_p1</property>
			<property>aero/eda_p1</property>
		    </product>
		    <product>
			<property>aero/cd_p2</property>
			<property>aero/eda_p2</property>
		    </product>
		    <product>
			<property>aero/cd_p3</property>
			<property>aero/eda_p3</property>
		    </product>
		    <product>
			<property>aero/cd_p4</property>
			<property>aero/eda_p4</property>
		    </product>
		    <product>
			<property>aero/cd_p5</property>
			<property>aero/eda_p5</property>
		    </product>
		</sum>
	    </product>
	</function>

	<function name="aero/force/Drag_gear">
	    <description>Drag due to gear</description>
	    <product>
		<property>aero/qbar-psf</property>
		<property>metrics/Sw-sqft</property>
		<property>gear/gear-pos-norm</property>
		<value> 0.0200 </value>
	    </product>
	</function>

	<function name="aero/force/Drag_speedbrake">
	    <description>Drag due to speedbrakes</description>
	    <product>
		<property>aero/qbar-psf</property>
		<property>metrics/Sw-sqft</property>
		<property>fcs/speedbrake-pos-norm</property>
		<value> 0.0800 </value>
	    </product>
	</function>

    </axis>

    <function name="aero/force/CS">
	<sum>
	    <property>aero/CS_base</property>
	    <property>aero/CS_flaps</property>
	    <property>aero/s/cfyp</property>
	    <property>aero/s/cfyr</property>
	    <!-- <product> -->
	    <!-- 	<property>aero/CS_rudder</property> -->
	    <!-- 	<value>1</value> -->
	    <!-- </product> -->
	</sum>
    </function>

    <axis name="SIDE">

	<function name="aero/force/Side_combined">
	    <description>Side force</description>
	    <product>
		<property>aero/qbar-psf</property>
		<property>metrics/Sw-sqft</property>
		<property>aero/force/CS</property>
	    </product>
	</function>

    </axis>

    <function name="aero/moment/CMy">
	<sum>
	    <property>aero/CMy_base</property>
	    <property>aero/CMy_elevator</property>
	    <property>aero/CMy_flaps</property>
	    <property>aero/CMy_slats</property>
	    <property>aero/s/cmmq</property>
	    <property>aero/s/cmma</property>
	</sum>
    </function>

    <axis name="PITCH">

	<function name="aero/moment/Pitch_combined">
	    <description>Pitch moment due to alpha</description>
	    <product>
		<property>aero/qbar-psf</property>
		<property>metrics/Sw-sqft</property>
		<property>metrics/cbarw-ft</property>
		<property>aero/moment/CMy</property>
	    </product>
	</function>
    </axis>

    <function name="aero/moment/CMx">
	<sum>
	    <property>aero/CMx_base</property>
	    <!-- <property>aero/s/cmlr</property> -->
	    <product>
		<sum>
		    <property>aero/CMx_rudder</property>
		    <property>aero/CMx_left-flaperon</property>
		    <property>aero/CMx_right-flaperon</property>
		    <property>aero/s/cmlp</property>
		</sum>
		<value>-1</value>
	    </product>
	</sum>
    </function>

    <axis name="ROLL">

	<function name="aero/moment/Roll_combined">
	    <description>Roll moment</description>
	    <product>
		<property>aero/qbar-psf</property>
		<property>metrics/Sw-sqft</property>
		<property>metrics/bw-ft</property>
		<property>aero/moment/CMx</property>
	    </product>
	</function>
    </axis>

    <function name="aero/moment/CMz">
	<sum>
	    <!-- <property>aero/s/cmnr</property> -->
	    <!-- <property>aero/CMz_left-flaperon</property> -->
	    <!-- <property>aero/CMz_right-flaperon</property> -->
	    <product>
		<sum>
		    <property>aero/s/cmnp</property>
		    <property>aero/CMz_base</property>
		    <property>aero/CMz_rudder</property>
		</sum>
		<value>-1</value>
	    </product>
	</sum>
    </function>

    <axis name="YAW">

	<function name="aero/moment/Yaw_combined">
	    <description>moment</description>
	    <product>
		<property>aero/qbar-psf</property>
		<property>metrics/Sw-sqft</property>
		<property>metrics/bw-ft</property>
		<property>aero/moment/CMz</property>
	    </product>
	</function>

	<!-- <function name="aero/moment/Yaw_damp"> -->
	<!--     <description>Yaw moment due to yaw rate</description> -->
	<!--     <product> -->
	<!-- 	<property>aero/qbar-psf</property> -->
	<!-- 	<property>metrics/Sw-sqft</property> -->
	<!-- 	<property>metrics/bw-ft</property> -->
	<!-- 	<property>aero/bi2vel</property> -->
	<!-- 	<property>velocities/r-aero-rad_sec</property> -->
	<!-- 	<value>-0.15</value> -->
	<!--     </product> -->
	<!-- </function> -->

      	<!-- <function name="aero/moment/Yaw_beta"> -->
	<!--     <description>Yaw moment due to beta</description> -->
	<!--     <product> -->
	<!-- 	<property>aero/qbar-psf</property> -->
	<!-- 	<property>metrics/Sw-sqft</property> -->
	<!-- 	<property>metrics/bw-ft</property> -->
	<!-- 	<property>aero/beta-rad</property> -->
	<!-- 	<value>0.1926</value> <!-\- 0.1626 -\-> -->
	<!--     </product> -->
	<!-- </function> -->

	<function name="aero/moment/Yaw_stores">
	    <product>
		<property>aero/qbar-psf</property>
		<sum>
		    <product>
			<property>aero/cd_p1</property>
			<property>aero/eda_p1</property>
			<property>inertia/pointmass-location-Y-inches</property>
		    </product>
		    <product>
			<property>aero/cd_p2</property>
			<property>aero/eda_p2</property>
			<property>inertia/pointmass-location-Y-inches[1]</property>
		    </product>
		    <product>
			<property>aero/cd_p3</property>
			<property>aero/eda_p3</property>
			<property>inertia/pointmass-location-Y-inches[2]</property>
		    </product>
		    <product>
			<property>aero/cd_p4</property>
			<property>aero/eda_p4</property>
			<property>inertia/pointmass-location-Y-inches[3]</property>
		    </product>
		    <product>
			<property>aero/cd_p5</property>
			<property>aero/eda_p5</property>
			<property>inertia/pointmass-location-Y-inches[4]</property>
		    </product>
		</sum>
	    </product>
	</function>

	<!-- <function name="aero/moment/Yaw_roll_rate"> -->
	<!--     <description>Yaw moment due to roll rate</description> -->
	<!--     <product> -->
	<!-- 	<property>aero/qbar-psf</property> -->
	<!-- 	<property>metrics/Sw-sqft</property> -->
	<!-- 	<property>metrics/bw-ft</property> -->
	<!-- 	<property>aero/bi2vel</property> -->
	<!-- 	<property>velocities/r-aero-rad_sec</property> -->
	<!-- 	<value>-1.1</value> -->
	<!--     </product> -->
	<!-- </function> -->

    </axis>
</aerodynamics>
